# OpenSim document version 30000
Model:
  length_units: meters
  force_units: N
  gravity: 0 -9.80665 0
  publications:
    Copyright (c) 2021-present, Northwestern University, Shirley Ryan AbilityLab, Drexel University, University of Florida, and Edward Hines VA Medical Center.
    All rights reserved. -------------------- The ARMS hand and wrist model has been open sourced solely for non-commercial purposes (including research, academic,
    evaluation and personal uses) under the BSD 3-Clause License below. By downloading or using this software, (1) you accept the terms and conditions of the aforementioned
    open source license, (2) acknowledge that your use of this software is non-commercial and commercial use requires a commercial license, and (3) accept that use of the
    model software must be acknowledged in all publications, presentations, or documents describing work in which the ARMS hand and wrist modell is used by citing the
    following work: McFarland DC, Binder-Markey BI, Nichols JA, Wohlman SJ,de Bruin M, Murray WM. A Musculoskeletal Model of the Hand and Wrist Capable of Simulating
    Functional Tasks. 2021; bioRxiv, p. 2021.12.28.474357, 2021, doi: 10.1101/2021.12.28.474357.
    --------- Copyright (c) 2021-present, Northwestern University, Shirley Ryan AbilityLab, Drexel University, University of Florida, and Edward Hines VA Medical Center.
    All rights reserved. Redistribution and use in source and binary forms, with or without modification, are permitted provided that the following conditions are met:
    1. Redistributions of source code must retain the above copyright notice, this list of conditions and the following disclaimer. 2. Redistributions in binary form must
    reproduce the above copyright notice, this list of conditions and the following disclaimer in the documentation and/or other materials provided with the distribution.
    3. Neither the name of the copyright holder nor the names of its contributors may be used to endorse or promote products derived from this software without specific
    prior written permission. THIS SOFTWARE IS PROVIDED BY THE COPYRIGHT HOLDERS AND CONTRIBUTORS "AS IS" AND ANY EXPRESS OR IMPLIED WARRANTIES, INCLUDING,
    BUT NOT LIMITED TO, THE IMPLIED WARRANTIES OF MERCHANTABILITY AND FITNESS FOR A PARTICULAR PURPOSE ARE DISCLAIMED. IN NO EVENT SHALL THE COPYRIGHT HOLDER OR
    CONTRIBUTORS BE LIABLE FOR ANY DIRECT, INDIRECT, INCIDENTAL, SPECIAL, EXEMPLARY, OR CONSEQUENTIAL DAMAGES (INCLUDING, BUT NOT LIMITED TO, PROCUREMENT OF SUBSTITUTE
    GOODS OR SERVICES; LOSS OF USE, DATA, OR PROFITS; OR BUSINESS INTERRUPTION) HOWEVER CAUSED AND ON ANY THEORY OF LIABILITY, WHETHER IN CONTRACT, STRICT LIABILITY, OR
    TORT (INCLUDING NEGLIGENCE OR OTHERWISE) ARISING IN ANY WAY OUT OF THE USE OF THIS SOFTWARE, EVEN IF ADVISED OF THE POSSIBILITY OF SUCH DAMAGE.
  BodySet:
    Body ground: mass=0 mass_center=(0 0 0) inertia_xx=1 inertia_yy=1 inertia_zz=1 meshes=thorax.vtp
    Body clavicle: mass=0.156 mass_center=(-0.011096 0.0063723 0.054168) inertia_xx=0.00024259 inertia_yy=0.00025526
        inertia_zz=4.4423e-5 inertia_xy=-1.8982e-5 inertia_xz=-6.9941e-5 inertia_yz=5.3711e-5 meshes=clavicle.vtp
      WeldJoint sternoclavicular: parent_body=ground location_in_parent=(0.006325 0.00693 0.025465) location=(0 0 0)
    Body scapula: mass=0.70396 mass_center=(-0.054694 -0.035032 -0.043734) inertia_xx=0.0012429 inertia_yy=0.0011504
        inertia_zz=0.0013651 inertia_xy=0.0004494 inertia_xz=0.00040922 inertia_yz=0.0002411 meshes=scapula.vtp
      WeldJoint acromioclavicular: parent_body=clavicle location_in_parent=(-0.01433 0.02007 0.135535) location=(0 0 0)
    Body humerus: mass=1.99757 mass_center=(0.018064 -0.140141 -0.012746) inertia_xx=0.01227763 inertia_yy=0.00255133
        inertia_zz=0.01257888 inertia_xy=-0.00034741 inertia_xz=-0.0002325 inertia_yz=0.0012293 meshes=humerus.vtp
      WeldJoint shoulder2: parent_body=scapula location_in_parent=(-0.00955 -0.034 0.009) location=(0 0 0)
      WrapEllipsoid Elbow_PT_ECRL: xyz_body_rotation=(-0.161094 -0.110828 0.61453) translation=(0.003 -0.2872 -0.0069)
          quadrant=x dimensions=(0.018 0.025 0.035)
    Body ulna: mass=1.1053 mass_center=(0.00971783 -0.0959509 0.024286) inertia_xx=0.00541309 inertia_yy=0.00115318
        inertia_zz=0.00494361 inertia_xy=0.00031686 inertia_xz=-7.615e-5 inertia_yz=0.00109169 meshes=ulna.vtp
      WeldJoint elbow: parent_body=humerus location_in_parent=(0.0061 -0.2904 -0.0123)
          orientation_in_parent=(0.01291735 0.08601259 1.568347) location=(0 0 0)
    Body radius: mass=0.23359 mass_center=(0.0336341 -0.181559 0.0156) inertia_xx=0.00043855 inertia_yy=8.859e-5
        inertia_zz=0.00040258 inertia_xy=3.014e-5 inertia_xz=-4.24e-6 inertia_yz=6.418e-5 meshes=radius.vtp
      WeldJoint radioulnar: parent_body=ulna location_in_parent=(0.0004 -0.011503 0.019999) location=(0 0 0)
      WrapTorus ECU: xyz_body_rotation=(-0.986635 -0.148877 0.222704) translation=(-0.0163 -0.2417 0.0349) quadrant=all
          inner_radius=0.006 outer_radius=0.009
    Body proximal_row: mass=0.0001 mass_center=(0 0 0) inertia_xx=1e-5 inertia_yy=1e-5 inertia_zz=1e-5
        meshes=(lunate.vtp sdfastSCAPHOIDw.vtp sdfastPISIFORMw.vtp sdfastTRIQUETRALw.vtp)
      CustomJoint radiocarpal: parent_body=radius location_in_parent=(0.018 -0.242 0.025) location=(0 0 0)
        Coordinate deviation: motion_type=rotational default_value=9.910288e-8 range=(-0.1745329 0.4363323)
            clamped=true
        Coordinate flexion: motion_type=rotational default_value=3.876207e-11 range=(-1.22173 1.22173) clamped=true
        SpatialTransform: axes_held_at_zero=(rotation2 translation1 translation2 translation3)
          TransformAxis rotation1: coordinates=deviation axis=(-0.819064 -0.135611 -0.557444)
            SimmSpline: x=(-0.174533 0 0.436332) y=(-0.174533 0 0.436332)
          TransformAxis rotation3: coordinates=flexion axis=(0.9564267 -0.2522069 0.147104)
            SimmSpline: x=(-1.5708 1.5708) y=(-0.785398 0.785398)
      WrapTorus ECRL: xyz_body_rotation=(1.53833 0.234398 0.731118) translation=(0.0222 -0.0096 0.0208) quadrant=all
          inner_radius=0.008 outer_radius=0.016
      WrapTorus ECRB: xyz_body_rotation=(1.31266 -0.11781 -0.116239) translation=(0.0126 -0.0095 0.0186) quadrant=all
          inner_radius=0.008 outer_radius=0.01
      WrapTorus FCR: xyz_body_rotation=(-1.55596 -0.15324 -0.100007) translation=(0.0032 -0.0045 -0.019) quadrant=all
          inner_radius=0.001 outer_radius=0.0025
      WrapTorus FCU: xyz_body_rotation=(-1.57376 -0.0797616 0.39235) translation=(-0.0123 -0.0124 -0.0171) quadrant=all
          inner_radius=0.0068 outer_radius=0.008
      WrapEllipsoid FPL: xyz_body_rotation=(-0.16633 -0.082205 -0.0659735) translation=(0.017 -0.025 -0.0033)
          quadrant=-z dimensions=(0.016 0.01 0.01)
    Body capitate: mass=0.5819 mass_center=(-0.00301314 -0.0424993 -0.00112205) inertia_xx=0.00011 inertia_yy=6e-5
        inertia_zz=0.00015 inertia_xy=9e-7 inertia_xz=-2e-7 inertia_yz=1.2e-5
        meshes=(capitate.vtp sdfast_1seg_hand_fr_c_5mc.vtp sdfast_1seg_hand_fr_c_4mc.vtp sdfast_1seg_hand_fr_c_3mc.vtp sdfast_1seg_hand_fr_c_2mc.vtp)
      CustomJoint wrist_hand: parent_body=proximal_row location_in_parent=(0.003992 -0.015054 0.002327)
          location=(0 0 0)
        Coordinate wrist_hand_r1: motion_type=rotational default_value=1.345002e-7 range=(-99999.9 99999.9)
            clamped=false
        Coordinate wrist_hand_r3: motion_type=rotational default_value=1.938099e-11 range=(-99999.9 99999.9)
            clamped=false
        SpatialTransform: axes_held_at_zero=(rotation3 translation1 translation2 translation3)
          TransformAxis rotation1: coordinates=wrist_hand_r1 axis=(0.8991357 -0.3490529 -0.2640399)
              LinearFunction(coefficients=1 0)
          TransformAxis rotation2: coordinates=wrist_hand_r3 axis=(0.9971185 0.01069999 -0.07510096)
              LinearFunction(coefficients=1 0)
    Body trapezium: mass=1e-5 mass_center=(0 0 0) inertia_xx=1e-5 inertia_yy=1e-5 inertia_zz=1e-5 meshes=trapezium.vtp
      WeldJoint cap_trpzm: parent_body=capitate location_in_parent=(0.015293 -0.004569 -0.010308) location=(0 0 0)
    Body trapezoid: mass=1e-5 mass_center=(0 0 0) inertia_xx=1e-5 inertia_yy=1e-5 inertia_zz=1e-5 meshes=trapezoid.vtp
      WeldJoint cap_trpzd: parent_body=capitate location_in_parent=(0.009143 -0.004062 -0.002464) location=(0 0 0)
    Body hamate: mass=1e-5 mass_center=(0 0 0) inertia_xx=1e-5 inertia_yy=1e-5 inertia_zz=1e-5 meshes=hamate.vtp
      WeldJoint cap_ham: parent_body=capitate location_in_parent=(-0.010969 -0.002495 -0.00075) location=(0 0 0)
    Body firstmc1: mass=1e-5 mass_center=(0 0 0) inertia_xx=1e-5 inertia_yy=1e-5 inertia_zz=1e-5
      CustomJoint CMC1a: parent_body=trapezium location_in_parent=(0 0 0) location=(0 0 0)
        Coordinate cmc_flexion: motion_type=rotational default_value=-0.2617994 range=(-0.7853982 0.2617994)
            clamped=true
        SpatialTransform: axes_held_at_zero=(rotation1 rotation2 translation1 translation2 translation3)
          TransformAxis rotation3: coordinates=cmc_flexion axis=(0.04239899 0.6652858 -0.7453838)
              LinearFunction(coefficients=1 0)
    Body firstmc: mass=0.016 mass_center=(0.00784 -0.01472 -0.00602) inertia_xx=2.378846e-6 inertia_yy=1.421707e-6
        inertia_zz=2.524615e-6 inertia_xy=9.444563e-7 inertia_xz=5.020686e-7 inertia_yz=-8.172509e-7 meshes=1mc.vtp
      CustomJoint CMC1b: parent_body=firstmc1 location_in_parent=(0.0072 -0.0054 -0.0025) location=(0 0 0)
        Coordinate cmc_abduction: motion_type=rotational default_value=-0.3490659 range=(-0.4363323 0.4363323)
            clamped=true
        SpatialTransform: axes_held_at_zero=(rotation2 rotation3 translation1 translation2 translation3)
          TransformAxis rotation1: coordinates=cmc_abduction axis=(0.495557 0.731736 0.467959)
              LinearFunction(coefficients=1 0)
      WrapCylinder MPthumb: xyz_body_rotation=(0.321315 0.11013 -0.834791) translation=(0.0177 -0.0305 -0.0143)
          quadrant=all radius=0.0085 length=0.02
    Body proximal_thumb: mass=0.0079 mass_center=(0.0096 -0.0163 -0.0063) inertia_xx=5.211279e-7 inertia_yy=3.192629e-7
        inertia_zz=5.85041e-7 inertia_xy=1.89419e-7 inertia_xz=7.523766e-8 inertia_yz=-1.25343e-7 meshes=thumbprox.vtp
      CustomJoint MCP: parent_body=firstmc location_in_parent=(0.0165 -0.0292 -0.0127) location=(0 0 0)
        Coordinate mp_flexion: motion_type=rotational default_value=0.3490659 range=(-0.6981317 0.7853982) clamped=true
        SpatialTransform: axes_held_at_zero=(rotation1 rotation2 translation1 translation2 translation3)
          TransformAxis rotation3: coordinates=mp_flexion axis=(0.084295 0.203488 -0.975442)
              LinearFunction(coefficients=1 0)
      WrapCylinder IPthumb: xyz_body_rotation=(0.304734 0.0129154 0.0879646) translation=(0.0121 -0.0302 -0.0096)
          quadrant=-x radius=0.0045 length=0.01
    Body distal_thumb: mass=0.0031 mass_center=(0.00557 -0.01042 -0.0044) inertia_xx=9.214091e-8 inertia_yy=6.446102e-8
        inertia_zz=1.002098e-7 inertia_xy=2.835474e-8 inertia_xz=1.306917e-8 inertia_yz=-2.092194e-8
        meshes=thumbdist.vtp
      CustomJoint IP: parent_body=proximal_thumb location_in_parent=(0.014 -0.0259 -0.0101) location=(0 0 0)
        Coordinate ip_flexion: motion_type=rotational default_value=0.6981317 range=(-0.4363323 1.308997) clamped=true
        SpatialTransform: axes_held_at_zero=(rotation1 rotation2 translation1 translation2 translation3)
          TransformAxis rotation3: coordinates=ip_flexion axis=(0.05010201 0.4796231 -0.8760431)
              LinearFunction(coefficients=1 0)
    Body Principal_axes: mass=0.001 mass_center=(0 0 0) inertia_xx=0.0001 inertia_yy=0.0001 inertia_zz=0.0001
      WeldJoint principal_axes: parent_body=distal_thumb location_in_parent=(0.010679 -0.018041 -0.007083)
          orientation_in_parent=(2.2216 -1.0388 -2.9301) location=(0 0 0)
    Body Thumbtip: mass=0.001 mass_center=(0 0 0) inertia_xx=0.0001 inertia_yy=0.0001 inertia_zz=0.0001
      WeldJoint thumbtip: parent_body=Principal_axes location_in_parent=(0 0 0)
          orientation_in_parent=(1.5708 0 -1.5708) location=(0 0 0)
    Body fingers: mass=0.0001 mass_center=(0 0 0) inertia_xx=1e-5 inertia_yy=1e-5 inertia_zz=1e-5
        meshes=(hand_2proxph.vtp hand_2midph.vtp hand_2distph.vtp hand_3proxph.vtp hand_3midph.vtp hand_3distph.vtp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)
      WeldJoint wrist_fingers: parent_body=capitate location_in_parent=(0 0 0) location=(0 0 0)
  ConstraintSet:
    CoordinateCouplerConstraint wrist_hand_r1_con: independent_coordinate_names=deviation
        dependent_coordinate_name=wrist_hand_r1 scale_factor=1
      coupled_coordinates_function: SimmSpline f18: x=(-0.174533 0 0.436332) y=(-0.261799 0 0.436332)
    CoordinateCouplerConstraint wrist_hand_r3_con: independent_coordinate_names=flexion
        dependent_coordinate_name=wrist_hand_r3 scale_factor=1
      coupled_coordinates_function: SimmSpline f19: x=(-1.22173 1.22173) y=(-0.610865 0.610865)
    PointConstraint EndEffectorConstraint: body_1=Thumbtip body_2=ground location_body_1=(0 0 0)
        location_body_2=(0.344238 -0.230602 0.1489)
  ForceSet:
    CoordinateLimitForce deviation_ligaments: coordinate=deviation upper_stiffness=52.5961 [N*m/degree]
        upper_limit=20 [degrees] lower_stiffness=487.176 [N*m/degree] lower_limit=-6 [degrees] damping=0
        transition=39.1586 [degrees]
    CoordinateLimitForce deviation_damping: coordinate=deviation upper_stiffness=1e-8 upper_limit=190
        lower_stiffness=1e-8 lower_limit=190 damping=0.001745 transition=1
    CoordinateLimitForce flexion_ligaments: coordinate=flexion upper_stiffness=200 upper_limit=60
        lower_stiffness=135.3232 lower_limit=-60 damping=0 transition=92.916
    CoordinateLimitForce flexion_damping: coordinate=flexion upper_stiffness=1e-8 upper_limit=190 lower_stiffness=1e-8
        lower_limit=190 damping=0.00043633 transition=1
    FunctionBasedBushingForce cmc_flexion_passive_torque: body_1=capitate body_2=firstmc1
        location_body_1=(0.015293 -0.004569 -0.010308) orientation_body_1=(-0.7805 0.9677 1.496)
        location_body_2=(0 0 0) orientation_body_2=(-0.7805 0.9677 1.496) rotational_damping=(0.0142 0 0)
        translational_damping=(0 0 0) moment_visual_scale=0.005 force_visual_scale=0.005 visual_aspect_ratio=5
        m_y_theta_y_function=Constant(value=0) m_z_theta_z_function=Constant(value=0)
        f_x_delta_x_function=Constant(value=0) f_y_delta_y_function=Constant(value=0)
        f_z_delta_z_function=Constant(value=0)
      m_x_theta_x_function: SimmSpline: x=(-0.785398 -0.744674 -0.703949 -0.663225 -0.622501 -0.581776 -0.541052 -0.500328 -0.459603 -0.418879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)
          y=(-2.11246 -1.56572 -1.12697 -0.813336 -0.583454 -0.422181 -0.311359 -0.232826 -0.171442 -0.12721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)
    FunctionBasedBushingForce cmc_abduction_passive_torque: body_1=firstmc1 body_2=firstmc
        location_body_1=(0.0072 -0.0054 -0.0025) orientation_body_1=(0.19 -0.5753 0.939) location_body_2=(0 0 0)
        orientation_body_2=(0.19 -0.5753 0.939) rotational_damping=(0.0142 0 0) translational_damping=(0 0 0)
        moment_visual_scale=0.005 force_visual_scale=0.005 visual_aspect_ratio=5 m_y_theta_y_function=Constant(value=0)
        m_z_theta_z_function=Constant(value=0) f_x_delta_x_function=Constant(value=0)
        f_y_delta_y_function=Constant(value=0) f_z_delta_z_function=Constant(value=0)
      m_x_theta_x_function: SimmSpline: x=(-0.523599 -0.491866 -0.460132 -0.428399 -0.396666 -0.364932 -0.333199 -0.301466 -0.269733 -0.237999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)
          y=(-0.988633 -0.896213 -0.791667 -0.682573 -0.605303 -0.527273 -0.443939 -0.345455 -0.299243 -0.220455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)
    FunctionBasedBushingForce mcp_flexion_passive_torque: body_1=firstmc body_2=proximal_thumb
        location_body_1=(0.0165 -0.0292 -0.0127) orientation_body_1=(-4.4639 2.6726 4.6178) location_body_2=(0 0 0)
        orientation_body_2=(-4.4639 2.6726 4.6178) rotational_damping=(0.0142 0 0) translational_damping=(0 0 0)
        moment_visual_scale=0.005 force_visual_scale=0.005 visual_aspect_ratio=5 m_y_theta_y_function=Constant(value=0)
        m_z_theta_z_function=Constant(value=0) f_x_delta_x_function=Constant(value=0)
        f_y_delta_y_function=Constant(value=0) f_z_delta_z_function=Constant(value=0)
      m_x_theta_x_function: SimmSpline: x=(-0.698132 -0.645148 -0.592165 -0.539182 -0.486199 -0.433216 -0.380232 -0.327249 -0.274266 -0.221283 -0.1683 -0.115316 -0.0623332 -0.00934998 0.0436332 0.0966164 0.1496 0.202583 0.255566 0.308549 0.361532 0.414516 0.467499 0.520482 0.573465 0.626449 0.679432 0.732415 0.785398)
          y=(-0.125354 -0.0897995 -0.0644929 -0.0464804 -0.0336594 -0.0245336 -0.0180378 -0.0134138 -0.0101216 -0.00777699 -0.00610597 -0.00491312 -0.00405861 -0.00344171 -0.00298887 -0.00264477 -0.00236534 -0.00211178 -0.00184472 -0.00151746 -0.00106725 -0.000402609 0.000615687 0.00220416 0.00470291 0.00864866 0.0148902 0.0247709 0.0404181)
    FunctionBasedBushingForce ip_flexion_passive_torque: body_1=proximal_thumb body_2=distal_thumb
        location_body_1=(0.014 -0.0259 -0.0101) orientation_body_1=(-0.9482 1.1788 1.4393) location_body_2=(0 0 0)
        orientation_body_2=(-0.9482 1.1788 1.4393) rotational_damping=(0.0105 0 0) translational_damping=(0 0 0)
        moment_visual_scale=0.005 force_visual_scale=0.005 visual_aspect_ratio=5 m_y_theta_y_function=Constant(value=0)
        m_z_theta_z_function=Constant(value=0) f_x_delta_x_function=Constant(value=0)
        f_y_delta_y_function=Constant(value=0) f_z_delta_z_function=Constant(value=0)
      m_x_theta_x_function: SimmSpline: x=(-0.4363 -0.374 -0.3117 -0.2493 -0.187 -0.1247 -0.0623 0 0.0623 0.1247 0.187 0.2493 0.3117 0.374 0.4363 0.4987 0.561 0.6233 0.6857 0.748 0.8103 0.8727 0.935 0.9973 1.0597 1.122 1.1843 1.2467 1.309)
          y=(-0.0696 -0.0449 -0.0322 -0.0232 -0.0168 -0.0123 -0.009 -0.0067 -0.0051 -0.0039 -0.0031 -0.0025 -0.002 -0.0017 -0.0015 -0.0013 -0.0012 -0.0011 -0.0009 -0.0008 -0.0005 -0.0002 0.0003 0.0011 0.0024 0.0043 0.0074 0.0124 0.0289)
    Millard2012EquilibriumMuscle [values shared by the 14 below unless stated]: max_control=1
        max_contraction_velocity=10 fiber_damping=0.1 default_fiber_length=0.1 minimum_activation=0.01
      ActiveForceLengthCurve: min_norm_active_fiber_length=0.4441 transition_norm_fiber_length=0.73
          max_norm_active_fiber_length=1.8123 shallow_ascending_slope=0.8616 minimum_value=0
      ForceVelocityCurve: concentric_slope_at_vmax=0 concentric_slope_near_vmax=0.25 isometric_slope=5
          eccentric_slope_at_vmax=0 eccentric_slope_near_vmax=0.15 max_eccentric_velocity_force_multiplier=1.4
      FiberForceLengthCurve: strain_at_zero_force=0 strain_at_one_norm_force=0.7
      TendonForceLengthCurve: strain_at_one_norm_force=0.049
    Millard2012EquilibriumMuscle ECRL: min_control=0 optimal_force=1 max_isometric_force=337.3
        optimal_fiber_length=0.081 tendon_slack_length=0.244 pennation_angle_at_optimal=0 [radians]
        default_activation=0.01238483
      PathPoint P1: humerus (-0.0073 -0.2609 0.0091)
      PathPoint P2: radius (0.03195 -0.13463 0.02779)
      PathPoint P3: radius (0.04243 -0.23684 0.0362)
      PathPoint P4: capitate (0.01717 -0.02122 0.00583)
      PathWrap: wrap_object=Elbow_PT_ECRL method=hybrid
      PathWrap: wrap_object=ECRL method=hybrid
    Millard2012EquilibriumMuscle ECRB: min_control=0 max_isometric_force=252.5 optimal_fiber_length=0.0585
        tendon_slack_length=0.2223 pennation_angle_at_optimal=0.1570796 default_activation=0.3662206
      PathPoint P1: humerus (0.01349 -0.29048 0.01698)
      PathPoint P2: radius (0.02905 -0.13086 0.02385)
      PathPoint P3: radius (0.03549 -0.22805 0.03937)
      PathPoint P4: capitate (0.005 -0.01136 0.0085)
      PathWrap: wrap_object=ECRB method=hybrid
    Millard2012EquilibriumMuscle ECU: min_control=0 max_isometric_force=192.9 optimal_fiber_length=0.0622
        tendon_slack_length=0.2285 pennation_angle_at_optimal=0.0698132 default_activation=0.9986212
      PathPoint P1: humerus (0.00083 -0.28955 0.0188)
      PathPoint P2: ulna (-0.01391 -0.03201 0.02947)
      PathPoint P3: ulna (-0.01705 -0.05428 0.02868)
      PathPoint P4: ulna (-0.01793 -0.09573 0.03278)
      PathPoint P5: radius (-0.01421 -0.22696 0.03481)
      PathPoint P6: capitate (-0.02251 -0.01401 -0.00128)
      PathWrap: wrap_object=ECU method=hybrid
    Millard2012EquilibriumMuscle FCR: min_control=0 max_isometric_force=407.9 optimal_fiber_length=0.0628
        tendon_slack_length=0.244 pennation_angle_at_optimal=0.0523599 default_activation=0.01
      PathPoint P1: humerus (0.00758 -0.27806 -0.03705)
      PathPoint P2: radius (0.0211 -0.21943 0.00127)
      PathPoint P3: capitate (0.01124 -0.01844 -0.00418)
      PathWrap: wrap_object=Elbow_PT_ECRL method=hybrid
      PathWrap: wrap_object=FCR method=hybrid
    Millard2012EquilibriumMuscle FCU: min_control=0 max_isometric_force=479.8 optimal_fiber_length=0.0509
        tendon_slack_length=0.265 pennation_angle_at_optimal=0.2094395 default_activation=0.6076837
      PathPoint P1: humerus (0.00219 -0.2774 -0.0388)
      PathPoint P2: radius (0.00949 -0.1841 0.0005)
      PathPoint P3: radius (0.01082 -0.22327 0.00969)
      PathPoint P4: capitate (-0.02036 -0.01765 -0.00752)
      PathWrap: wrap_object=FCU method=hybrid
      PathWrap: wrap_object=Elbow_PT_ECRL method=hybrid
    Millard2012EquilibriumMuscle EPL: min_control=0 max_isometric_force=88.3 optimal_fiber_length=0.054
        tendon_slack_length=0.2305 pennation_angle_at_optimal=0.1047198 default_activation=0.473967
      PathPoint P1: ulna (-0.01412 -0.09706 0.02952)
      PathPoint P2: radius (0.00124 -0.13668 0.0227)
      PathPoint P3: radius (0.02702 -0.21872 0.03828)
      PathPoint P4: radius (0.03382 -0.22754 0.04607)
      PathPoint P5: radius (0.04234 -0.23771 0.04173)
      PathPoint P6: capitate (0.02428 0.00014 0.00608)
      PathPoint P7: capitate (0.02338 -0.00917 -0.00039)
      PathPoint P8: firstmc (0.00656 -0.0043 0.00792)
      PathPoint P9: firstmc (0.02165 -0.0242 -0.00533)
      PathPoint P10: proximal_thumb (0.01147 -0.00362 0.00156)
      PathPoint P11: proximal_thumb (0.01921 -0.0265 -0.01038)
      PathPoint P12: distal_thumb (0.00543 -0.00714 -0.00464)
      PathWrap: wrap_object=MPthumb method=hybrid
    Millard2012EquilibriumMuscle EPB: min_control=0 max_isometric_force=46 optimal_fiber_length=0.0675
        tendon_slack_length=0.1155 pennation_angle_at_optimal=0.122173 default_activation=0.07694563
      PathPoint P1: radius (0.01924 -0.14695 0.02114)
      PathPoint P2: radius (0.02276 -0.15857 0.02665)
      PathPoint P3: radius (0.03831 -0.19722 0.03834)
      PathPoint P4: radius (0.05235 -0.23611 0.02699)
      PathPoint P5: capitate (0.03123 0.00256 -0.00327)
      PathPoint P6: firstmc1 (0.01443 -0.00337 -0.00405)
      PathPoint P7: firstmc (0.02173 -0.02303 -0.01141)
      PathPoint P8: proximal_thumb (0.00927 -0.00618 -0.00557)
      PathWrap: wrap_object=MPthumb method=hybrid
    Millard2012EquilibriumMuscle FPL: min_control=0 max_isometric_force=201 optimal_fiber_length=0.0552
        tendon_slack_length=0.197 pennation_angle_at_optimal=0.1221731 default_activation=1
      PathPoint P1: radius (0.00971 -0.09458 0.01769)
      PathPoint P2: radius (0.01658 -0.13525 0.01915)
      PathPoint P3: radius (0.01869 -0.17932 0.01988)
      PathPoint P4: radius (0.038 -0.23171 0.0158)
      MovingPathPoint P5: capitate (0.01869 0.00882002 -0.01547) x_coordinate=flexion y_coordinate=flexion
          z_coordinate=flexion
        x_location: SimmSpline: x=(-1.22173 0 1.22173) y=(0.01869 0.01869 0.01229)
        y_location: SimmSpline: x=(-1.22173 0 1.22173) y=(0.00882 0.00882 -0.01038)
        z_location: SimmSpline: x=(-1.22173 0 1.22173) y=(-0.01547 -0.01547 -0.02627)
      PathPoint P6: capitate (0.01244 -0.02207 -0.02089)
      PathPoint P7: firstmc (-0.00608 -0.01624 -0.0094)
      PathPoint P8: firstmc (0.00208 -0.02297 -0.00956)
      PathPoint P9: proximal_thumb (-0.0045 -0.01842 -0.00508)
      PathPoint P10: proximal_thumb (0.0059 -0.02602 -0.01114)
      PathPoint P11: distal_thumb (0.00242 -0.01127 -0.00412)
      PathWrap: wrap_object=FPL method=hybrid
      PathWrap: wrap_object=IPthumb method=hybrid range=(10 11)
      PathWrap: wrap_object=MPthumb method=hybrid
    Millard2012EquilibriumMuscle APL: min_control=0 max_isometric_force=116.7 optimal_fiber_length=0.0713
        tendon_slack_length=0.1295 pennation_angle_at_optimal=0.1396263 default_activation=0.0129334
      PathPoint P1: radius (0.01154 -0.09477 0.01681)
      PathPoint P2: radius (0.0303 -0.1397 0.03507)
      PathPoint P3: radius (0.03993 -0.16072 0.034)
      PathPoint P4: radius (0.04397 -0.17845 0.03134)
      PathPoint P5: radius (0.05505 -0.23084 0.02368)
      MovingPathPoint P6: capitate (0.0336 0.00624 -0.00794999) x_coordinate=flexion y_coordinate=flexion
          z_coordinate=flexion
        x_location: SimmSpline: x=(-1.22173 0 1.22173) y=(0.03385 0.0336 0.0276)
        y_location: SimmSpline: x=(-1.22173 0 1.22173) y=(0.00634 0.00624 0.00384)
        z_location: SimmSpline: x=(-1.22173 0 1.22173) y=(-0.00745 -0.00795 -0.01995)
      PathPoint P7: firstmc1 (0.01058 0.00662 -0.00619)
      PathPoint P8: firstmc (0.00629 0.00323 -0.00589)
      PathPoint P9: firstmc (0.00827 -0.00586 -0.00604)
    Millard2012EquilibriumMuscle APB: min_control=0.01 max_isometric_force=34.54 optimal_fiber_length=0.0511
        tendon_slack_length=0.02436921 pennation_angle_at_optimal=0.08028515 default_activation=0.08647987
      PathPoint P1: capitate (0.012493 -0.005469 -0.016108)
      PathPoint P1: trapezium (0.00806407 -0.000600866 -0.00780272)
      PathPoint P4: proximal_thumb (0.00770617 -0.0047171 -0.009)
      PathPoint P5: proximal_thumb (0.0148 -0.02 -0.011)
    Millard2012EquilibriumMuscle FPB: min_control=0.01 max_isometric_force=33.53 optimal_fiber_length=0.0509
        tendon_slack_length=0.006795853 pennation_angle_at_optimal=0.1082104 default_activation=0.1294416
      PathPoint FPB_opt-P1: capitate (0.00959 -0.00667 -0.01481)
      PathPoint FPB_opt-P2: trapezium (0.0015 -0.0124979 -0.00496)
      PathPoint FPB_opt-P3: proximal_thumb (-0.00565728 -0.00240197 0.00084)
      PathPoint FPB_opt-P4: proximal_thumb (0.002 -0.013 -0.004)
    Millard2012EquilibriumMuscle OPP: min_control=0.01 max_isometric_force=51.82 optimal_fiber_length=0.0436
        tendon_slack_length=0.002540121 pennation_angle_at_optimal=0.08552113 default_activation=0.5164564
      PathPoint P1: capitate (0.01129 -0.00147 -0.01731)
      PathPoint P2: firstmc (-0.00238629 -0.00894 -0.00551728)
      PathPoint P3: firstmc (0.012 -0.028 -0.017)
    Millard2012EquilibriumMuscle ADPt: min_control=0.01 max_isometric_force=59.944 optimal_fiber_length=0.0417
        tendon_slack_length=0.02311892 pennation_angle_at_optimal=0.301942 default_activation=0.9966636
      PathPoint ADPt_opt-P1: capitate (0.00064 -0.02422 0.00149)
      PathPoint ADPt_opt-P2: trapezium (0.0082177 -0.0246635 -0.00488374)
      PathPoint ADPt_opt-P3: proximal_thumb (-0.00730309 -0.00505412 -0.00146726)
      PathPoint ADPt_opt-P4: proximal_thumb (0.0056 -0.0095 0.0023)
    Millard2012EquilibriumMuscle ADPo: min_control=0.01 max_isometric_force=102.108 optimal_fiber_length=0.03477273
        tendon_slack_length=0.0378533 pennation_angle_at_optimal=0.301942 default_activation=0.8732391
      PathPoint ADPo_opt-P1: capitate (-0.00131 -0.00527 -0.00665)
      PathPoint ADPo_opt-P2: trapezium (0.00741594 -0.0214963 -0.00466016)
      PathPoint ADPo_opt-P3: proximal_thumb (-0.00698466 -0.00535159 -0.000499131)
      PathPoint ADPo_opt-P4: proximal_thumb (0.0051 -0.01352 -0.00715)
