# OpenSim document version 30000
ForceSet reserves:
  # Reserve Motors to assist muscles
  CoordinateActuator [values shared by the 11 below unless stated]: min_control=-10 max_control=10 optimal_force=.01
  CoordinateActuator 4cmc_flexion_reserve: coordinate=4cmc_flexion
  CoordinateActuator cmc_flexion_reserve: coordinate=cmc_flexion
  CoordinateActuator cmc_abduction_reserve: coordinate=cmc_abduction
  CoordinateActuator 2pm_flexion_reserve: coordinate=2pm_flexion
  CoordinateActuator 2md_flexion_reserve: coordinate=2md_flexion
  CoordinateActuator 3pm_flexion_reserve: coordinate=3pm_flexion
  CoordinateActuator 3md_flexion_reserve: coordinate=3md_flexion
  CoordinateActuator 4md_flexion_reserve: coordinate=4md_flexion
  CoordinateActuator 4pm_flexion_reserve: coordinate=4pm_flexion
  CoordinateActuator 5pm_flexion_reserve: coordinate=5pm_flexion
  CoordinateActuator 5md_flexion_reserve: coordinate=5md_flexion
