# OpenSim document version 30000
Model:
  length_units: meters
  force_units: N
  gravity: 0 -9.80665 0
  publications:
    Copyright (c) 2021-present, Northwestern University, Shirley Ryan AbilityLab, Drexel University, University of Florida, and Edward Hines VA Medical Center.
    All rights reserved. -------------------- The ARMS hand and wrist model has been open sourced solely for non-commercial purposes (including research, academic,
    evaluation and personal uses) under the BSD 3-Clause License below. By downloading or using this software, (1) you accept the terms and conditions of the aforementioned
    open source license, (2) acknowledge that your use of this software is non-commercial and commercial use requires a commercial license, and (3) accept that use of the
    model software must be acknowledged in all publications, presentations, or documents describing work in which the ARMS hand and wrist modell is used by citing the
    following work: McFarland DC, Binder-Markey BI, Nichols JA, Wohlman SJ,de Bruin M, Murray WM. A Musculoskeletal Model of the Hand and Wrist Capable of Simulating
    Functional Tasks. 2021; bioRxiv, p. 2021.12.28.474357, 2021, doi: 10.1101/2021.12.28.474357.
    --------- Copyright (c) 2021-present, Northwestern University, Shirley Ryan AbilityLab, Drexel University, University of Florida, and Edward Hines VA Medical Center.
    All rights reserved. Redistribution and use in source and binary forms, with or without modification, are permitted provided that the following conditions are met:
    1. Redistributions of source code must retain the above copyright notice, this list of conditions and the following disclaimer. 2. Redistributions in binary form must
    reproduce the above copyright notice, this list of conditions and the following disclaimer in the documentation and/or other materials provided with the distribution.
    3. Neither the name of the copyright holder nor the names of its contributors may be used to endorse or promote products derived from this software without specific
    prior written permission. THIS SOFTWARE IS PROVIDED BY THE COPYRIGHT HOLDERS AND CONTRIBUTORS "AS IS" AND ANY EXPRESS OR IMPLIED WARRANTIES, INCLUDING,
    BUT NOT LIMITED TO, THE IMPLIED WARRANTIES OF MERCHANTABILITY AND FITNESS FOR A PARTICULAR PURPOSE ARE DISCLAIMED. IN NO EVENT SHALL THE COPYRIGHT HOLDER OR
    CONTRIBUTORS BE LIABLE FOR ANY DIRECT, INDIRECT, INCIDENTAL, SPECIAL, EXEMPLARY, OR CONSEQUENTIAL DAMAGES (INCLUDING, BUT NOT LIMITED TO, PROCUREMENT OF SUBSTITUTE
    GOODS OR SERVICES; LOSS OF USE, DATA, OR PROFITS; OR BUSINESS INTERRUPTION) HOWEVER CAUSED AND ON ANY THEORY OF LIABILITY, WHETHER IN CONTRACT, STRICT LIABILITY, OR
    TORT (INCLUDING NEGLIGENCE OR OTHERWISE) ARISING IN ANY WAY OUT OF THE USE OF THIS SOFTWARE, EVEN IF ADVISED OF THE POSSIBILITY OF SUCH DAMAGE.
  BodySet:
    Body ground: mass=0 mass_center=(0 0 0) inertia_xx=1 inertia_yy=1 inertia_zz=1 meshes=thorax.vtp
    Body clavicle: mass=0.156 mass_center=(-0.011096 0.0063723 0.054168) inertia_xx=0.00024259 inertia_yy=0.00025526
        inertia_zz=4.4423e-5 inertia_xy=-1.8982e-5 inertia_xz=-6.9941e-5 inertia_yz=5.3711e-5 meshes=clavicle.vtp
      WeldJoint sternoclavicular: parent_body=ground location_in_parent=(0.006325 0.00693 0.025465) location=(0 0 0)
    Body scapula: mass=0.70396 mass_center=(-0.054694 -0.035032 -0.043734) inertia_xx=0.0012429 inertia_yy=0.0011504
        inertia_zz=0.0013651 inertia_xy=0.0004494 inertia_xz=0.00040922 inertia_yz=0.0002411 meshes=scapula.vtp
      WeldJoint acromioclavicular: parent_body=clavicle location_in_parent=(-0.01433 0.02007 0.135535) location=(0 0 0)
    Body humerus: mass=1.99757 mass_center=(0.018064 -0.140141 -0.012746) inertia_xx=0.01227763 inertia_yy=0.00255133
        inertia_zz=0.01257888 inertia_xy=-0.00034741 inertia_xz=-0.0002325 inertia_yz=0.0012293 meshes=humerus.vtp
      WeldJoint shoulder2: parent_body=scapula location_in_parent=(-0.00955 -0.034 0.009) location=(0 0 0)
      WrapEllipsoid Elbow_PT_ECRL: xyz_body_rotation=(-0.161094 -0.110828 0.61453) translation=(0.003 -0.2872 -0.0069)
          quadrant=x dimensions=(0.018 0.025 0.035)
    Body ulna: mass=1.1053 mass_center=(0.00971783 -0.0959509 0.024286) inertia_xx=0.00541309 inertia_yy=0.00115318
        inertia_zz=0.00494361 inertia_xy=0.00031686 inertia_xz=-7.615e-5 inertia_yz=0.00109169 meshes=ulna.vtp
      WeldJoint elbow: parent_body=humerus location_in_parent=(0.0061 -0.2904 -0.0123)
          orientation_in_parent=(0.01291735 0.08601259 1.568347) location=(0 0 0)
    Body radius: mass=0.23359 mass_center=(0.0336341 -0.181559 0.0156) inertia_xx=0.00043855 inertia_yy=8.859e-5
        inertia_zz=0.00040258 inertia_xy=3.014e-5 inertia_xz=-4.24e-6 inertia_yz=6.418e-5 meshes=radius.vtp
      WeldJoint radioulnar: parent_body=ulna location_in_parent=(0.0004 -0.011503 0.019999) location=(0 0 0)
      WrapTorus ECU: xyz_body_rotation=(-0.986635 -0.148877 0.222704) translation=(-0.0163 -0.2417 0.0349) quadrant=all
          inner_radius=0.006 outer_radius=0.009
    Body proximal_row: mass=0.0001 mass_center=(0 0 0) inertia_xx=1e-5 inertia_yy=1e-5 inertia_zz=1e-5
        meshes=(lunate.vtp sdfastSCAPHOIDw.vtp sdfastPISIFORMw.vtp sdfastTRIQUETRALw.vtp)
      CustomJoint radiocarpal: parent_body=radius location_in_parent=(0.018 -0.242 0.025) location=(0 0 0)
        Coordinate deviation: motion_type=rotational default_value=8.845494e-8 range=(-0.1745329 0.4363323)
            clamped=true
        Coordinate flexion: motion_type=rotational default_value=2.820131e-9 range=(-1.22173 1.22173) clamped=true
        SpatialTransform: axes_held_at_zero=(rotation2 translation1 translation2 translation3)
          TransformAxis rotation1: coordinates=deviation axis=(-0.819064 -0.135611 -0.557444)
            SimmSpline: x=(-0.174533 0 0.436332) y=(-0.174533 0 0.436332)
          TransformAxis rotation3: coordinates=flexion axis=(0.9564267 -0.2522069 0.147104)
            SimmSpline: x=(-1.5708 1.5708) y=(-0.785398 0.785398)
      WrapEllipsoid EIP: xyz_body_rotation=(-0.250804 0.285536 0.232827) translation=(0.0007 -0.0135 0.0047) quadrant=z
          dimensions=(0.05 0.02 0.013)
      WrapTorus ECRL: xyz_body_rotation=(1.53833 0.234398 0.731118) translation=(0.0222 -0.0096 0.0208) quadrant=all
          inner_radius=0.008 outer_radius=0.016
      WrapTorus ECRB: xyz_body_rotation=(1.31266 -0.11781 -0.116239) translation=(0.0126 -0.0095 0.0186) quadrant=all
          inner_radius=0.008 outer_radius=0.01
      WrapTorus FCR: xyz_body_rotation=(-1.55596 -0.15324 -0.100007) translation=(0.0032 -0.0045 -0.019) quadrant=all
          inner_radius=0.001 outer_radius=0.0025
      WrapTorus FCU: xyz_body_rotation=(-1.57376 -0.0797616 0.39235) translation=(-0.0123 -0.0124 -0.0171) quadrant=all
          inner_radius=0.0068 outer_radius=0.008
      WrapEllipsoid PL: xyz_body_rotation=(-0.0315905 0.0996583 0.0633554) translation=(0.0057 -0.018 -0.0041)
          quadrant=-z dimensions=(0.025 0.014 0.012)
      WrapEllipsoid FDS: xyz_body_rotation=(0.00837758 -0.0816814 -0.0171042) translation=(0.0012 -0.0057 -0.0003)
          quadrant=-z dimensions=(0.025 0.013 0.012)
      WrapEllipsoid FDP: xyz_body_rotation=(-1.46747 -0.194604 0.121824) translation=(-0.0022 -0.0069 0.0032)
          quadrant=y dimensions=(0.025 0.013 0.012)
      WrapTorus EDCL: xyz_body_rotation=(2.36318 0.193033 -0.26913) translation=(-0.0128 -0.0133 0.0148) quadrant=all
          inner_radius=0.008 outer_radius=0.012
      WrapTorus EDCR: xyz_body_rotation=(1.98392 0.100531 0.523075) translation=(-0.0098 -0.0137 0.0166) quadrant=all
          inner_radius=0.0105 outer_radius=0.011
      WrapTorus EDCM: xyz_body_rotation=(1.99317 0.19792 0.368264) translation=(-0.0007 -0.0117 0.0191) quadrant=all
          inner_radius=0.009 outer_radius=0.012
      WrapTorus EDCI: xyz_body_rotation=(1.69768 0.0897099 0.00767945) translation=(0.009 -0.0149 0.0211) quadrant=all
          inner_radius=0.009 outer_radius=0.012
      WrapEllipsoid EDM: xyz_body_rotation=(2.9627 0.159349 0.117984) translation=(-0.0167 -0.0022 0.0048) quadrant=-z
          dimensions=(0.018 0.014 0.008)
      WrapEllipsoid FPL: xyz_body_rotation=(-0.16633 -0.082205 -0.0659735) translation=(0.018 -0.024 -0.0053)
          quadrant=-z dimensions=(0.016 0.01 0.01)
    Body capitate: mass=0.32742 mass_center=(-0.00028 0.00333 -0.0045) inertia_xx=1.505771e-5 inertia_yy=3.367647e-5
        inertia_zz=3.962505e-5 meshes=capitate.vtp
      CustomJoint wrist_hand: parent_body=proximal_row location_in_parent=(0.003992 -0.015054 0.002327)
          location=(0 0 0)
        Coordinate wrist_hand_r1: motion_type=rotational default_value=1.200458e-7 range=(-99999.9 99999.9)
            clamped=false
        Coordinate wrist_hand_r3: motion_type=rotational default_value=1.410066e-9 range=(-99999.9 99999.9)
            clamped=false
        SpatialTransform: axes_held_at_zero=(rotation3 translation1 translation2 translation3)
          TransformAxis rotation1: coordinates=wrist_hand_r1 axis=(0.8991357 -0.3490529 -0.2640399)
              LinearFunction(coefficients=1 0)
          TransformAxis rotation2: coordinates=wrist_hand_r3 axis=(0.9971185 0.01069999 -0.07510096)
              LinearFunction(coefficients=1 0)
    Body trapezium: mass=1e-5 mass_center=(0 0 0) inertia_xx=1e-5 inertia_yy=1e-5 inertia_zz=1e-5 meshes=trapezium.vtp
      WeldJoint cap_trpzm: parent_body=capitate location_in_parent=(0.015293 -0.004569 -0.010308) location=(0 0 0)
    Body trapezoid: mass=1e-5 mass_center=(0 0 0) inertia_xx=1e-5 inertia_yy=1e-5 inertia_zz=1e-5 meshes=trapezoid.vtp
      WeldJoint cap_trpzd: parent_body=capitate location_in_parent=(0.009143 -0.004062 -0.002464) location=(0 0 0)
    Body hamate: mass=1e-5 mass_center=(0 0 0) inertia_xx=1e-5 inertia_yy=1e-5 inertia_zz=1e-5 meshes=hamate.vtp
      WeldJoint cap_ham: parent_body=capitate location_in_parent=(-0.010969 -0.002495 -0.00075) location=(0 0 0)
    Body firstmc1: mass=1e-5 mass_center=(0 0 0) inertia_xx=1e-5 inertia_yy=1e-5 inertia_zz=1e-5
      CustomJoint CMC1a: parent_body=trapezium location_in_parent=(0 0 0) location=(0 0 0)
        Coordinate cmc_flexion: motion_type=rotational default_value=-1.409216e-14 range=(-0.7853982 0.2617994)
            clamped=false
        SpatialTransform: axes_held_at_zero=(rotation1 rotation2 translation1 translation2 translation3)
          TransformAxis rotation3: coordinates=cmc_flexion axis=(0.04239899 0.6652858 -0.7453838)
              LinearFunction(coefficients=1 0)
    Body firstmc: mass=0.016 mass_center=(0.00784 -0.01472 -0.00602) inertia_xx=2.378846e-6 inertia_yy=1.421707e-6
        inertia_zz=2.524615e-6 inertia_xy=9.444563e-7 inertia_xz=5.020686e-7 inertia_yz=-8.172509e-7 meshes=1mc.vtp
      CustomJoint CMC1b: parent_body=firstmc1 location_in_parent=(0.0072 -0.0054 -0.0025) location=(0 0 0)
        Coordinate cmc_abduction: motion_type=rotational default_value=-1.1404e-13 range=(-0.4363323 0.4363323)
            clamped=false
        SpatialTransform: axes_held_at_zero=(rotation2 rotation3 translation1 translation2 translation3)
          TransformAxis rotation1: coordinates=cmc_abduction axis=(0.495557 0.731736 0.467959)
              LinearFunction(coefficients=1 0)
      WrapCylinder MPthumb: xyz_body_rotation=(0.321315 0.11013 -0.834791) translation=(0.0177 -0.0305 -0.0143)
          quadrant=all radius=0.0085 length=0.02
    Body proximal_thumb: mass=0.0079 mass_center=(0.0096 -0.0163 -0.0063) inertia_xx=5.211279e-7 inertia_yy=3.192629e-7
        inertia_zz=5.85041e-7 inertia_xy=1.89419e-7 inertia_xz=7.523766e-8 inertia_yz=-1.25343e-7 meshes=thumbprox.vtp
      CustomJoint MCP: parent_body=firstmc location_in_parent=(0.0165 -0.0292 -0.0127) location=(0 0 0)
        Coordinate mp_flexion: motion_type=rotational default_value=-1.529585e-14 range=(-0.6981317 0.7853982)
            clamped=false
        SpatialTransform: axes_held_at_zero=(rotation1 rotation2 translation1 translation2 translation3)
          TransformAxis rotation3: coordinates=mp_flexion axis=(0.084295 0.203488 -0.975442)
              LinearFunction(coefficients=1 0)
      WrapCylinder IPthumb: xyz_body_rotation=(0.304734 0.0129154 0.0879646) translation=(0.0121 -0.0302 -0.0096)
          quadrant=-x radius=0.0045 length=0.01
    Body distal_thumb: mass=0.0031 mass_center=(0.00557 -0.01042 -0.0044) inertia_xx=9.214091e-8 inertia_yy=6.446102e-8
        inertia_zz=1.002098e-7 inertia_xy=2.835474e-8 inertia_xz=1.306917e-8 inertia_yz=-2.092194e-8
        meshes=thumbdist.vtp
      CustomJoint IP: parent_body=proximal_thumb location_in_parent=(0.014 -0.0259 -0.0101) location=(0 0 0)
        Coordinate ip_flexion: motion_type=rotational default_value=-3.997008e-14 range=(-0.4363323 1.308997)
            clamped=false
        SpatialTransform: axes_held_at_zero=(rotation1 rotation2 translation1 translation2 translation3)
          TransformAxis rotation3: coordinates=ip_flexion axis=(0.05010201 0.4796231 -0.8760431)
              LinearFunction(coefficients=1 0)
    Body secondmc: mass=0.03636364 mass_center=(0 0 0) inertia_xx=9.776936e-6 inertia_yy=5.290096e-7
        inertia_zz=9.742933e-6 inertia_xy=1.454395e-6 inertia_xz=-2.397342e-7 inertia_yz=1.561189e-6 meshes=2mc.vtp
      WeldJoint CMC2: parent_body=capitate location_in_parent=(0.014685 -0.03762 0.005032) location=(0 0 0)
      WrapCylinder 2ndmcp_extI: xyz_body_rotation=(0.593936 1.50011 -1.99125) translation=(0.003501 -0.025 0.0038)
          quadrant=all radius=0.009 length=0.01
      WrapCylinder 2ndmcp_FDSI: xyz_body_rotation=(0.593936 1.50011 -2.16578) translation=(0.003501 -0.0275 0.00362)
          quadrant=Y radius=0.011 length=0.02
      WrapCylinder 2ndmcp_FDPI: xyz_body_rotation=(0.593936 1.50011 -2.23559) translation=(0.003501 -0.0275 0.00362)
          quadrant=Y radius=0.0102 length=0.02
    Body thirdmc: mass=0.03809524 mass_center=(0 0 0) inertia_xx=8.888716e-6 inertia_yy=2.947451e-7
        inertia_zz=8.743963e-6 inertia_xy=1.28499e-7 inertia_xz=-1.678536e-8 inertia_yz=1.12285e-6 meshes=3mc.vtp
      WeldJoint CMC3: parent_body=capitate location_in_parent=(0.000477 -0.039239 0.007377) location=(0 0 0)
      WrapCylinder _3rdmcp: xyz_body_rotation=(2.57942 -1.44967 2.90615) translation=(0.0016 -0.0271 0.0001)
          quadrant=all radius=0.005 length=0.02
    Body fourthmc: mass=0.03333333 mass_center=(-0.002 -0.0214 0.0034) inertia_xx=6.851178e-6 inertia_yy=3.488712e-7
        inertia_zz=6.793058e-6 inertia_xy=-7.037344e-7 inertia_xz=1.002242e-7 inertia_yz=9.367657e-7 meshes=4mc_new.vtp
      CustomJoint CMC4: parent_body=capitate location_in_parent=(-0.0097 -0.0147 0.0015) location=(0 0 0)
        Coordinate 4cmc_flexion: motion_type=rotational default_value=0.0001580928 range=(0 0.2032) clamped=true
        SpatialTransform: axes_held_at_zero=(rotation2 rotation3 translation1 translation2 translation3)
          TransformAxis rotation1: coordinates=4cmc_flexion axis=(0.58 -0.8006 -0.1506)
              LinearFunction(coefficients=1 0)
      WrapCylinder _4thmcp: xyz_body_rotation=(-2.97212 -1.22173 -2.46318)
          translation=(-0.0057013 -0.0508692 0.0044135) quadrant=all radius=0.005 length=0.02
    Body fifthmc: mass=0.02962963 mass_center=(-0.00611809 -0.0176936 0.00542873) inertia_xx=4.765645e-6
        inertia_yy=5.731278e-7 inertia_zz=4.819501e-6 inertia_xy=-1.056523e-6 inertia_xz=2.226449e-7
        inertia_yz=9.364397e-7 meshes=5mc_new.vtp
      CustomJoint CMC5: parent_body=capitate location_in_parent=(-0.0171 -0.0118 -0.0036) location=(0 0 0)
        Coordinate CMC5_r1: motion_type=rotational default_value=0.0004300871 range=(-99999.9 99999.9) clamped=false
        SpatialTransform: axes_held_at_zero=(rotation2 rotation3 translation1 translation2 translation3)
          TransformAxis rotation1: coordinates=CMC5_r1 axis=(0.3718 -0.8665 0.3333) LinearFunction(coefficients=1 0)
      WrapCylinder _5thmcp: xyz_body_rotation=(-2.67175 -1.5 -2.46598) translation=(-0.0130014 -0.0430027 0.0100162)
          quadrant=all radius=0.005 length=0.02
      WrapEllipsoid 5thmcp: xyz_body_rotation=(-2.67175 -1.5 -2.46598) translation=(-0.015 -0.0429103 0.008)
          quadrant=-x dimensions=(0.005 0.005 0.0065)
    Body 2proxph: mass=0.0158 mass_center=(0.0044 -0.0253 0.004) inertia_xx=2.411515e-6 inertia_yy=5.630737e-7
        inertia_zz=2.401331e-6 inertia_xy=3.314063e-7 inertia_xz=-6.250606e-8 inertia_yz=3.594997e-7 meshes=2proxph.vtp
      CustomJoint _2MCP: parent_body=secondmc location_in_parent=(0.003501 -0.028243 0.00362) location=(0 0 0)
        Coordinate 2mcp_abduction: motion_type=rotational default_value=-8.68321e-29 range=(-0.2617994 0.2617994)
            clamped=false
        Coordinate 2mcp_flexion: motion_type=rotational default_value=8.748977e-9 range=(-0.7853982 1.570796)
            clamped=true
        SpatialTransform: axes_held_at_zero=(rotation3 translation1 translation2 translation3)
          TransformAxis rotation1: coordinates=2mcp_abduction axis=(0.214609 0.191508 0.957741)
              LinearFunction(coefficients=1 0)
          TransformAxis rotation2: coordinates=2mcp_flexion axis=(0.9785767 0.02602229 -0.1973295)
              LinearFunction(coefficients=1 0)
      WrapCylinder 2ndpm_FDSI: xyz_body_rotation=(-2.99394 1.28823 1.41721) translation=(0.0075 -0.041 0.0045)
          quadrant=all radius=0.0055 length=0.01
      WrapCylinder 2ndpm_FDPI: xyz_body_rotation=(-2.99394 1.28823 1.41721) translation=(0.0075 -0.0405 0.008)
          quadrant=y radius=0.008 length=0.02
      WrapCylinder 2ndpm_extI: xyz_body_rotation=(-2.99394 1.28823 1.41721) translation=(0.0075 -0.04075 0.0073)
          quadrant=-y radius=0.00425 length=0.012
      WrapCylinder Secondpm: xyz_body_rotation=(0.741939 -1.47393 0.709651) translation=(0.0075 -0.0407 0.0061)
          quadrant=x radius=0.004 length=0.01
    Body 2midph: mass=0.0049 mass_center=(0.0022 -0.0154 0.00018) inertia_xx=2.83258e-7 inertia_yy=7.296437e-8
        inertia_zz=2.854517e-7 inertia_xy=2.386486e-8 inertia_xz=-1.133653e-9 inertia_yz=1.011662e-8 meshes=2midph.vtp
      CustomJoint _2prox-midph_b: parent_body=2proxph location_in_parent=(0.007517 -0.041273 0.007326) location=(0 0 0)
        Coordinate 2pm_flexion: motion_type=rotational default_value=0.0001464264 range=(0 1.745329) clamped=true
        SpatialTransform: axes_held_at_zero=(rotation2 rotation3 translation1 translation2 translation3)
          TransformAxis rotation1: coordinates=2pm_flexion axis=(0.976336 0.1267122 -0.1753944)
              LinearFunction(coefficients=1 0)
      WrapCylinder 2ndmd_extI: xyz_body_rotation=(-2.755 1.36537 1.1767) translation=(0.0033 -0.0215 0.0035)
          quadrant=-y radius=0.004 length=0.01
      WrapCylinder Secondmd: xyz_body_rotation=(0.501782 -1.41302 0.647343) translation=(0.0036 -0.0243 0.0003)
          quadrant=x radius=0.004 length=0.01
    Body 2distph: mass=0.0018 mass_center=(0.0013 -0.01 2e-5) inertia_xx=4.551719e-8 inertia_yy=1.575204e-8
        inertia_zz=4.617751e-8 inertia_xy=5.527199e-9 inertia_xz=-5.750238e-10 inertia_yz=3.199957e-9
        meshes=2distph.vtp
      CustomJoint _2mid-distph: parent_body=2midph location_in_parent=(0.003333 -0.024888 0.00122) location=(0 0 0)
        Coordinate 2md_flexion: motion_type=rotational default_value=0.0001402316 range=(0 1.396263) clamped=true
        SpatialTransform: axes_held_at_zero=(rotation2 rotation3 translation1 translation2 translation3)
          TransformAxis rotation1: coordinates=2md_flexion axis=(0.9866912 0.1471512 0.07494557)
              LinearFunction(coefficients=1 0)
    Body 3proxph: mass=0.0193 mass_center=(0.00097 -0.0262 0.0037) inertia_xx=3.523751e-6 inertia_yy=6.164587e-7
        inertia_zz=3.510049e-6 inertia_xy=8.59086e-8 inertia_xz=-6.417686e-9 inertia_yz=2.173748e-7 meshes=3proxph.vtp
      CustomJoint _3MCP: parent_body=thirdmc location_in_parent=(0.00024 -0.02629 0.001778) location=(0 0 0)
        Coordinate 3mcp_abduction: motion_type=rotational default_value=1.157066e-25 range=(-0.2617994 0.2617994)
            clamped=true
        Coordinate 3mcp_flexion: motion_type=rotational default_value=6.844315e-9 range=(-0.7853982 1.570796)
            clamped=true
        SpatialTransform: axes_held_at_zero=(rotation3 translation1 translation2 translation3)
          TransformAxis rotation1: coordinates=3mcp_abduction axis=(-0.021499 0.118897 0.992674)
              LinearFunction(coefficients=1 0)
          TransformAxis rotation2: coordinates=3mcp_flexion axis=(0.9983488 0.0473371 -0.01041285)
              LinearFunction(coefficients=1 0)
      WrapCylinder Thirdpm: xyz_body_rotation=(1.80886 -1.50604 1.85319) translation=(0.0017 -0.0439 0.005)
          radius=0.005 length=0.01
    Body 3midph: mass=0.00642 mass_center=(0.00071 -0.0168 0.0013) inertia_xx=5.245042e-7 inertia_yy=1.014302e-7
        inertia_zz=5.247298e-7 inertia_xy=1.994009e-8 inertia_xz=-8.171619e-10 inertia_yz=1.737636e-8 meshes=3midph.vtp
      CustomJoint _3prox-midph_b: parent_body=3proxph location_in_parent=(0.00165 -0.044211 0.00623) location=(0 0 0)
        Coordinate 3pm_flexion: motion_type=rotational default_value=2.761928e-12 range=(0 1.745329) clamped=false
        SpatialTransform: axes_held_at_zero=(rotation2 rotation3 translation1 translation2 translation3)
          TransformAxis rotation1: coordinates=3pm_flexion axis=(0.992829 -0.062002 0.102203)
              LinearFunction(coefficients=1 0)
      WrapCylinder Thirdmd: xyz_body_rotation=(1.37881 -1.4933 1.51861) translation=(0.0014 -0.028 0.0012) quadrant=x
          radius=0.004 length=0.01
    Body 3distph: mass=0.00252 mass_center=(0.0005 -0.0102 -0.00028) inertia_xx=8.075958e-8 inertia_yy=2.651121e-8
        inertia_zz=8.058514e-8 inertia_xy=4.0623e-9 inertia_xz=-3.798455e-10 inertia_yz=5.100782e-9 meshes=3distph.vtp
      CustomJoint _3mid-distph: parent_body=3midph location_in_parent=(0.001365 -0.029047 0.001954) location=(0 0 0)
        Coordinate 3md_flexion: motion_type=rotational default_value=0.0001197838 range=(0 1.396263) clamped=true
        SpatialTransform: axes_held_at_zero=(rotation2 rotation3 translation1 translation2 translation3)
          TransformAxis rotation1: coordinates=3md_flexion axis=(0.994589 0.036103 0.097409)
              LinearFunction(coefficients=1 0)
    Body 4proxph: mass=0.01374 mass_center=(-0.00223386 -0.0237516 0.00349321) inertia_xx=1.95194e-6
        inertia_yy=3.906117e-7 inertia_zz=1.956827e-6 inertia_xy=-2.017199e-7 inertia_xz=2.306819e-8
        inertia_yz=1.814817e-7 meshes=4proxph_new.vtp
      CustomJoint _4MCP: parent_body=fourthmc location_in_parent=(-0.0053 -0.0489 0.007) location=(0 0 0)
        Coordinate 4mcp_abduction: motion_type=rotational default_value=1.309426e-10 range=(-0.2617994 0.2617994)
            clamped=true
        Coordinate 4mcp_flexion: motion_type=rotational default_value=4.766837e-9 range=(-0.7853982 1.570796)
            clamped=true
        SpatialTransform: axes_held_at_zero=(rotation3 translation1 translation2 translation3)
          TransformAxis rotation1: coordinates=4mcp_abduction axis=(-0.022094 0.144366 0.989278)
              LinearFunction(coefficients=1 0)
          TransformAxis rotation2: coordinates=4mcp_flexion axis=(0.9948176 -0.06526001 -0.02971703)
              LinearFunction(coefficients=1 0)
      WrapCylinder Fourthpm: xyz_body_rotation=(0 -1.5 0) translation=(-0.00416056 -0.0398013 0.00417815) radius=0.004
          length=0.01
    Body 4midph: mass=0.00568 mass_center=(-0.00197812 -0.0147055 0.00118627) inertia_xx=3.603893e-7
        inertia_yy=9.431428e-8 inertia_zz=3.603058e-7 inertia_xy=-2.365085e-8 inertia_xz=2.127264e-9
        inertia_yz=2.41196e-8 meshes=4midph_new.vtp
      CustomJoint _4prox-midph_b: parent_body=4proxph location_in_parent=(-0.0039 -0.0398 0.0057) location=(0 0 0)
        Coordinate 4pm_flexion: motion_type=rotational default_value=-1.627947e-11 range=(0 1.745329) clamped=false
        SpatialTransform: axes_held_at_zero=(rotation2 rotation3 translation1 translation2 translation3)
          TransformAxis rotation1: coordinates=4pm_flexion axis=(0.9958278 -0.03458071 0.09232488)
              LinearFunction(coefficients=1 0)
      WrapCylinder Fourthmd: xyz_body_rotation=(0 -1.5 0) translation=(-0.00263942 -0.023 0.00256231) quadrant=x
          radius=0.005 length=0.01
    Body 4distph: mass=0.0029 mass_center=(-0.000427077 -0.0101666 0.00202904) inertia_xx=9.907164e-8
        inertia_yy=3.644078e-8 inertia_zz=9.651653e-8 inertia_xy=-5.723026e-9 inertia_xz=1.26263e-9
        inertia_yz=1.393222e-8 meshes=4distph_new.vtp
      CustomJoint _4mid-distph: parent_body=4midph location_in_parent=(-0.0026 -0.0245 0.0033) location=(0 0 0)
        Coordinate 4md_flexion: motion_type=rotational default_value=-3.835448e-11 range=(0 1.396263) clamped=false
        SpatialTransform: axes_held_at_zero=(rotation2 rotation3 translation1 translation2 translation3)
          TransformAxis rotation1: coordinates=4md_flexion axis=(0.9526 -0.14 0.2701) LinearFunction(coefficients=1 0)
    Body 5proxph: mass=0.01106 mass_center=(-0.00810107 -0.0210768 0.00214055) inertia_xx=1.18153e-6
        inertia_yy=3.716424e-7 inertia_zz=1.291222e-6 inertia_xy=-3.284914e-7 inertia_xz=2.812591e-8
        inertia_yz=7.931717e-8 meshes=5proxph_new.vtp
      CustomJoint _5MCP: parent_body=fifthmc location_in_parent=(-0.0111 -0.0423 0.0097) location=(0 0 0)
        Coordinate 5mcp_abduction: motion_type=rotational default_value=-2.532864e-9 range=(-0.2617994 0.2617994)
            clamped=true
        Coordinate 5mcp_flexion: motion_type=rotational default_value=1.02388e-9 range=(-0.7853982 1.570796)
            clamped=true
        SpatialTransform: axes_held_at_zero=(rotation3 translation1 translation2 translation3)
          TransformAxis rotation1: coordinates=5mcp_abduction axis=(-0.025001 0.216206 0.976028)
              LinearFunction(coefficients=1 0)
          TransformAxis rotation2: coordinates=5mcp_flexion axis=(0.9715007 -0.2128172 -0.03446347)
              LinearFunction(coefficients=1 0)
      WrapCylinder Fifthpm: xyz_body_rotation=(-1.75 -1.1 -2.95449) translation=(-0.0133173 -0.0327233 0.00294018)
          radius=0.004 length=0.01
    Body 5midph: mass=0.00372 mass_center=(-0.00489968 -0.0121355 -0.000152595) inertia_xx=1.565215e-7
        inertia_yy=6.144861e-8 inertia_zz=1.702002e-7 inertia_xy=-4.003082e-8 inertia_xz=3.688651e-9
        inertia_yz=1.010676e-8 meshes=5midph_new.vtp
      CustomJoint _5prox-midph_b: parent_body=5proxph location_in_parent=(-0.0125 -0.0335 0.0043) location=(0 0 0)
        Coordinate 5pm_flexion: motion_type=rotational default_value=4.877877e-5 range=(0 1.745329) clamped=true
        SpatialTransform: axes_held_at_zero=(rotation2 rotation3 translation1 translation2 translation3)
          TransformAxis rotation1: coordinates=5pm_flexion axis=(0.9287097 -0.3277133 0.1765911)
              LinearFunction(coefficients=1 0)
      WrapCylinder Fifthmd: xyz_body_rotation=(-2 -1.25 -1.75) translation=(-0.00736879 -0.0194062 0.00136094)
          quadrant=x radius=0.005 length=0.01
    Body 5distph: mass=0.00222 mass_center=(-0.00358265 -0.00888113 0.000331822) inertia_xx=5.055015e-8
        inertia_yy=2.887716e-8 inertia_zz=5.591125e-8 inertia_xy=-1.235346e-8 inertia_xz=1.14735e-9
        inertia_yz=2.532686e-9 meshes=5distph_new.vtp
      CustomJoint _5mid-distph: parent_body=5midph location_in_parent=(-0.0075 -0.0195 0.002) location=(0 0 0)
        Coordinate 5md_flexion: motion_type=rotational default_value=3.014571e-5 range=(0 1.396263) clamped=true
        SpatialTransform: axes_held_at_zero=(rotation2 rotation3 translation1 translation2 translation3)
          TransformAxis rotation1: coordinates=5md_flexion axis=(0.892729 -0.426766 0.144588)
              LinearFunction(coefficients=1 0)
  ConstraintSet:
    CoordinateCouplerConstraint CMC5_r1_con: independent_coordinate_names=4cmc_flexion
        dependent_coordinate_name=CMC5_r1
      coupled_coordinates_function: SimmSpline: x=(0 0.2032) y=(0 0.5528)
    CoordinateCouplerConstraint wrist_hand_r1_con: independent_coordinate_names=deviation
        dependent_coordinate_name=wrist_hand_r1 scale_factor=1
      coupled_coordinates_function: SimmSpline f18: x=(-0.174533 0 0.436332) y=(-0.261799 0 0.436332)
    CoordinateCouplerConstraint wrist_hand_r3_con: independent_coordinate_names=flexion
        dependent_coordinate_name=wrist_hand_r3 scale_factor=1
      coupled_coordinates_function: SimmSpline f19: x=(-1.22173 1.22173) y=(-0.610865 0.610865)
  ForceSet:
    Millard2012EquilibriumMuscle [values shared by the 43 below unless stated]: min_control=0 max_control=1
        max_contraction_velocity=10 fiber_damping=0.1 minimum_activation=0.01
      ActiveForceLengthCurve: min_norm_active_fiber_length=0.4327 transition_norm_fiber_length=0.728
          max_norm_active_fiber_length=1.595 shallow_ascending_slope=0.4613 minimum_value=0
      ForceVelocityCurve: concentric_slope_at_vmax=0 concentric_slope_near_vmax=0.25 isometric_slope=5
          eccentric_slope_at_vmax=0 eccentric_slope_near_vmax=0.15 max_eccentric_velocity_force_multiplier=1.4
      FiberForceLengthCurve: strain_at_zero_force=0 strain_at_one_norm_force=0.6405 stiffness_at_low_force=0.0751
          stiffness_at_one_norm_force=6.3163 curviness=0.6658
      TendonForceLengthCurve: strain_at_one_norm_force=0.033 stiffness_at_one_norm_force=37.393
          norm_force_at_toe_end=0.2255 curviness=0.4504
    Millard2012EquilibriumMuscle ECRL: max_isometric_force=337.3 optimal_fiber_length=0.081 tendon_slack_length=0.244
        pennation_angle_at_optimal=0 [radians] default_activation=1
      PathPoint P1: humerus (-0.0073 -0.2609 0.0091)
      PathPoint P2: radius (0.03195 -0.13463 0.02779)
      PathPoint P3: radius (0.04243 -0.23684 0.0362)
      PathPoint P4: capitate (0.01717 -0.02122 0.00583)
      PathWrap: wrap_object=Elbow_PT_ECRL method=hybrid
      PathWrap: wrap_object=ECRL method=hybrid
    Millard2012EquilibriumMuscle ECRB: max_isometric_force=252.5 optimal_fiber_length=0.0585 tendon_slack_length=0.2223
        pennation_angle_at_optimal=0.1570796 default_activation=1
      PathPoint P1: humerus (0.01349 -0.29048 0.01698)
      PathPoint P2: radius (0.02905 -0.13086 0.02385)
      PathPoint P3: radius (0.03549 -0.22805 0.03937)
      PathPoint P4: capitate (0.005 -0.01136 0.0085)
      PathWrap: wrap_object=ECRB method=hybrid
    Millard2012EquilibriumMuscle ECU: max_isometric_force=192.9 optimal_fiber_length=0.0622 tendon_slack_length=0.2285
        pennation_angle_at_optimal=0.0698132 default_activation=1
      PathPoint P1: humerus (0.00083 -0.28955 0.0188)
      PathPoint P2: ulna (-0.01391 -0.03201 0.02947)
      PathPoint P3: ulna (-0.01705 -0.05428 0.02868)
      PathPoint P4: ulna (-0.01793 -0.09573 0.03278)
      PathPoint P5: radius (-0.01421 -0.22696 0.03481)
      PathPoint P6: capitate (-0.02251 -0.01401 -0.00128)
      PathWrap: wrap_object=ECU method=hybrid
    Millard2012EquilibriumMuscle FCR: max_isometric_force=407.9 optimal_fiber_length=0.0628 tendon_slack_length=0.244
        pennation_angle_at_optimal=0.0523599 default_activation=1
      PathPoint P1: humerus (0.00758 -0.27806 -0.03705)
      PathPoint P2: radius (0.0211 -0.21943 0.00127)
      PathPoint P3: capitate (0.01124 -0.01844 -0.00418)
      PathWrap: wrap_object=Elbow_PT_ECRL method=hybrid
      PathWrap: wrap_object=FCR method=hybrid
    Millard2012EquilibriumMuscle FCU: max_isometric_force=479.8 optimal_fiber_length=0.0509 tendon_slack_length=0.265
        pennation_angle_at_optimal=0.2094395 default_activation=1
      PathPoint P1: humerus (0.00219 -0.2774 -0.0388)
      PathPoint P2: radius (0.00949 -0.1841 0.0005)
      PathPoint P3: radius (0.01082 -0.22327 0.00969)
      PathPoint P4: capitate (-0.02036 -0.01765 -0.00752)
      PathWrap: wrap_object=FCU method=hybrid
      PathWrap: wrap_object=Elbow_PT_ECRL method=hybrid
    Millard2012EquilibriumMuscle PL: max_isometric_force=101 optimal_fiber_length=0.0638 tendon_slack_length=0.2694
        pennation_angle_at_optimal=0.06981317 default_activation=1
      PathPoint P1: humerus (0.00457 -0.27519 -0.03865)
      PathPoint P2: radius (0.02531 -0.23915 -0.00276)
      PathPoint P3: capitate (0.00917 -0.01898 -0.01754)
      PathPoint P4: thirdmc (0.00179 0.00828 -0.00245)
      PathWrap: wrap_object=PL method=hybrid
      PathWrap: wrap_object=Elbow_PT_ECRL method=hybrid
    Millard2012EquilibriumMuscle FDSL: max_isometric_force=75.3 optimal_fiber_length=0.0515
        tendon_slack_length=0.3211348 pennation_angle_at_optimal=0.08726646 default_activation=1
      PathPoint P1: humerus (0.00421 -0.27598 -0.03864)
      PathPoint P2: radius (0.01377 -0.18718 0.00205)
      PathPoint P3: capitate (-0.00235 -0.01393 -0.01376)
      PathPoint P4: fourthmc (-0.00926994 -0.017401 -0.00651486)
      PathPoint P5: fifthmc (-0.01 -0.034 0.00144159)
      PathPoint P6: 5proxph (-0.005 -0.014 -0.004)
      PathPoint P7: 5proxph (-0.0108197 -0.0242436 0)
      PathPoint P8: 5midph (-0.00419747 -0.00527177 -0.00614276)
      PathWrap: wrap_object=FDS method=hybrid
      PathWrap: wrap_object=Elbow_PT_ECRL method=hybrid
      PathWrap: wrap_object=_5thmcp method=hybrid range=(5 6)
    Millard2012EquilibriumMuscle FDSR: max_isometric_force=171.2 optimal_fiber_length=0.0736
        tendon_slack_length=0.313447 pennation_angle_at_optimal=0.06981317 default_activation=1
      PathPoint P1: humerus (0.00479 -0.2788 -0.03731)
      PathPoint P2: radius (0.01571 -0.18666 0.00267)
      PathPoint P3: capitate (-0.00082 -0.01344 -0.01359)
      PathPoint P4: thirdmc (-0.00914 0.00544 -0.01085)
      PathPoint P5: fourthmc (-0.003 -0.039 -0.005)
      PathPoint P6: 4proxph (-0.002 -0.012 -0.006)
      PathPoint P7: 4proxph (-0.0008 -0.036 0.002)
      PathPoint P8: 4midph (-0.0009 -0.012 -0.0007)
      PathWrap: wrap_object=FDS method=hybrid
      PathWrap: wrap_object=Elbow_PT_ECRL method=hybrid
      PathWrap: wrap_object=_4thmcp method=hybrid range=(5 6)
    Millard2012EquilibriumMuscle FDSM: max_isometric_force=258.8 optimal_fiber_length=0.0749
        tendon_slack_length=0.2883793 pennation_angle_at_optimal=0.1221731 default_activation=1
      PathPoint P1: ulna (-0.00669 -0.02713 -0.00191)
      PathPoint P2: radius (0.01899 -0.18706 0.00424)
      PathPoint P3: capitate (0.0068 -0.01377 -0.01399)
      PathPoint P4: thirdmc (0.00128 0.00639 -0.00952)
      PathPoint P5: thirdmc (0 -0.016 -0.0085)
      PathPoint P6: 3proxph (0.001 -0.011 -0.009)
      PathPoint P7: 3proxph (0.003 -0.037 -0.002)
      PathPoint P8: 3midph (0.00023 -0.01075 -0.00541)
      PathWrap: wrap_object=FDS method=hybrid
      PathWrap: wrap_object=_3rdmcp method=hybrid range=(5 6)
    Millard2012EquilibriumMuscle FDSI: max_isometric_force=162.5 optimal_fiber_length=0.0835
        tendon_slack_length=0.2771446 pennation_angle_at_optimal=0.1047198 default_activation=1
      PathPoint P1: ulna (-0.00676 -0.02819 -0.00137)
      PathPoint P2: radius (0.02145 -0.18623 0.006)
      PathPoint P3: capitate (0.00889 -0.01366 -0.01387)
      PathPoint P4: secondmc (-0.00407 -0.00025 -0.00479)
      PathPoint P5: secondmc (-0.001 -0.021 -0.00579)
      PathPoint P6: 2proxph (-0.001 -0.014 -0.002705)
      PathPoint P6: 2proxph (0.00427 -0.035 0.004)
      PathPoint P7: 2midph (0.00228 -0.008 -0.005)
      PathWrap: wrap_object=FDS method=hybrid
      PathWrap: wrap_object=2ndmcp_FDSI method=hybrid range=(5 7)
      PathWrap: wrap_object=2ndpm_FDSI method=axial range=(7 8)
    Millard2012EquilibriumMuscle FDPL: max_isometric_force=236.8 optimal_fiber_length=0.0749
        tendon_slack_length=0.2932528 pennation_angle_at_optimal=0.1396263 default_activation=1
      PathPoint P1: ulna (-0.00628 -0.03214 0.00254)
      PathPoint P2: radius (0.01409 -0.18516 0.00861)
      PathPoint P3: capitate (-0.00088 -0.01027 -0.01188)
      PathPoint P4: fourthmc (-0.0107079 -0.0165164 0.000412855)
      PathPoint P5: fifthmc (-0.011 -0.036 0.004)
      PathPoint P6: 5proxph (-0.004 -0.01 -0.004)
      PathPoint P7: 5proxph (-0.0118783 -0.028 -0.003)
      PathPoint P8: 5midph (-0.00611082 -0.00773222 -0.0056409)
      PathPoint P9: 5midph (-0.00703421 -0.0151198 -0.00172322)
      PathPoint P10: 5distph (-0.00520646 -0.0107957 -0.00278697)
      PathWrap: wrap_object=FDP method=hybrid
      PathWrap: wrap_object=5thmcp method=hybrid range=(5 6)
    Millard2012EquilibriumMuscle FDPR: max_isometric_force=172.9 optimal_fiber_length=0.0798
        tendon_slack_length=0.2922496 pennation_angle_at_optimal=0.1221731 default_activation=1
      PathPoint P1: ulna (-0.00502 -0.03374 0.00273)
      PathPoint P2: radius (0.0158 -0.18629 0.00803)
      PathPoint P3: capitate (0.00106 -0.01177 -0.01184)
      PathPoint P4: thirdmc (-0.0104 0.00473 -0.00804)
      PathPoint P5: fourthmc (-0.003 -0.039 -0.001)
      PathPoint P6: 4proxph (-0.003 -0.011 -0.009)
      PathPoint P7: 4proxph (-0.005 -0.033 0.002)
      PathPoint P8: 4midph (-0.000219705 -0.00758918 -0.00586796)
      PathPoint P9: 4midph (-0.0016473 -0.0196795 0.000547576)
      PathPoint P10: 4distph (-0.00091307 -0.003901 -0.00311151)
      PathWrap: wrap_object=FDP method=hybrid
      PathWrap: wrap_object=_4thmcp method=hybrid range=(5 6)
    Millard2012EquilibriumMuscle FDPM: max_isometric_force=212.4 optimal_fiber_length=0.0835
        tendon_slack_length=0.295226 pennation_angle_at_optimal=0.1047198 default_activation=1
      PathPoint P1: ulna (-0.00522 -0.03327 0.0021)
      PathPoint P2: radius (0.01906 -0.18644 0.00785)
      PathPoint P3: capitate (0.00335 -0.0128 -0.01144)
      PathPoint P4: thirdmc (-0.00128 0.00609 -0.00838)
      PathPoint P5: thirdmc (0.0005 -0.0186823 -0.00767178)
      PathPoint P6: 3proxph (0.0005 -0.016 -0.00564398)
      PathPoint P7: 3proxph (0.00238 -0.03643 -0.001)
      PathPoint P8: 3midph (0.00158 -0.01149 -0.00512)
      PathPoint P9: 3midph (0.00213 -0.02144 -0.00213)
      PathPoint P10: 3distph (6e-5 -0.00501 -0.00419)
      PathWrap: wrap_object=FDP method=hybrid
      PathWrap: wrap_object=_3rdmcp method=hybrid range=(5 6)
    Millard2012EquilibriumMuscle FDPI: max_isometric_force=197.3 optimal_fiber_length=0.0749
        tendon_slack_length=0.3062338 pennation_angle_at_optimal=0.1221731 default_activation=1
      PathPoint P1: ulna (-0.00647 -0.03176 0.0028)
      PathPoint P2: radius (0.0208 -0.1856 0.00915)
      PathPoint P3: capitate (0.00896 -0.01168 -0.01212)
      PathPoint P4: secondmc (-0.00432 0.007 -0.00248)
      PathPoint P5: secondmc (0 -0.021 -0.005)
      PathPoint P6: 2proxph (0 -0.011 -0.002775)
      PathPoint P6: 2proxph (0.00581 -0.034 0.00306)
      PathPoint P7: 2midph (0.002 -0.021 -0.002)
      PathPoint P8: 2distph (0.00046 -0.0046 -0.003)
      PathWrap: wrap_object=FDP method=hybrid
      PathWrap: wrap_object=2ndmcp_FDPI method=hybrid
      PathWrap: wrap_object=2ndpm_FDPI method=hybrid
    Millard2012EquilibriumMuscle EDCL: max_isometric_force=39.4 optimal_fiber_length=0.065
        tendon_slack_length=0.3297528 pennation_angle_at_optimal=0.03490659 default_activation=1
      PathPoint P1: humerus (-0.0004 -0.28831 0.0187)
      PathPoint P2: radius (0.0013 -0.03888 0.01405)
      PathPoint P3: radius (0.00993 -0.22304 0.03618)
      PathPoint P4: fifthmc (-0.0098 -0.0393 0.0157)
      PathPoint P5: 5proxph (-0.00138649 -0.006 0.00864125)
      PathPoint P6: 5proxph (-0.0104924 -0.03 0.0098668)
      PathPoint P7: 5midph (-0.000199375 -0.00703822 0.00578716)
      PathPoint P8: 5midph (-0.00323208 -0.0190612 0.005)
      PathPoint P9: 5distph (-0.000565387 -0.0137207 0.003)
      PathWrap: wrap_object=EDCL method=hybrid range=(3 4)
      PathWrap: wrap_object=_5thmcp method=hybrid range=(4 5)
      PathWrap: wrap_object=Fifthpm method=hybrid range=(6 7)
      PathWrap: wrap_object=Fifthmd method=hybrid range=(8 9)
    Millard2012EquilibriumMuscle EDCR: max_isometric_force=109.2 optimal_fiber_length=0.0626
        tendon_slack_length=0.3414376 pennation_angle_at_optimal=0.05235988 default_activation=1
      PathPoint P1: humerus (-0.00156 -0.28936 0.01782)
      PathPoint P2: radius (0.0026 -0.03991 0.01552)
      PathPoint P3: radius (0.00882 -0.22366 0.043)
      PathPoint P4: fourthmc (-0.004 -0.049 0.013)
      PathPoint P5: 4proxph (0.001 -0.007 0.009)
      PathPoint P6: 4proxph (-0.003 -0.037 0.009)
      PathPoint P7: 4midph (0.00126345 -0.005 0.007)
      PathPoint P8: 4midph (-0.000192701 -0.023 0.007)
      PathPoint P9: 4distph (0.00153887 -0.004 0.005)
      PathWrap: wrap_object=EDCR method=hybrid range=(3 4)
      PathWrap: wrap_object=_4thmcp method=hybrid range=(4 5)
      PathWrap: wrap_object=Fourthpm method=hybrid range=(6 7)
      PathWrap: wrap_object=Fourthmd method=hybrid range=(8 9)
    Millard2012EquilibriumMuscle EDCM: max_isometric_force=94.4 optimal_fiber_length=0.0724
        tendon_slack_length=0.342363 pennation_angle_at_optimal=0.05235988 default_activation=1
      PathPoint P1: humerus (0.00051 -0.28984 0.01949)
      PathPoint P2: radius (0.00316 -0.03948 0.01528)
      PathPoint P3: radius (0.0144 -0.22323 0.04223)
      PathPoint P4: thirdmc (-0.00069 -0.027 0.01)
      PathPoint P5: 3proxph (-0.00118 -0.012 0.01074)
      PathPoint P6: 3proxph (0.00169 -0.04139 0.01127)
      PathPoint P7: 3midph (0.00039 -0.00423 0.00625)
      PathPoint P8: 3midph (0.000948021 -0.0287498 0.0054336)
      PathPoint P9: 3distph (-0.00058 -0.00694 0.00308)
      PathWrap: wrap_object=EDCM method=hybrid range=(1 4)
      PathWrap: wrap_object=_3rdmcp method=hybrid range=(4 5)
      PathWrap: wrap_object=Thirdpm method=hybrid range=(6 7)
      PathWrap: wrap_object=Thirdmd method=hybrid range=(8 9)
    Millard2012EquilibriumMuscle EDCI: max_isometric_force=48.8 optimal_fiber_length=0.07 tendon_slack_length=0.3485834
        pennation_angle_at_optimal=0.05235988 default_activation=1
      PathPoint P1: humerus (0.00065 -0.28898 0.01869)
      PathPoint P2: radius (0.00228 -0.03918 0.01483)
      PathPoint P3: radius (0.01533 -0.22314 0.04196)
      PathPoint P4: secondmc (0.00586478 -0.0255916 0.0133706)
      PathPoint P5: 2proxph (0.00308218 -0.00969151 0.0110479)
      PathPoint P6: 2proxph (0.00771 -0.038 0.013)
      PathPoint P7: 2midph (0.00123 -0.005 0.005)
      PathPoint P8: 2midph (0.0026 -0.018 0.006)
      PathPoint P9: 2distph (0.00025 -0.0037 0.00228)
      PathWrap: wrap_object=EDCI method=hybrid range=(3 4)
      PathWrap: wrap_object=2ndmcp_extI range=(4 5)
      PathWrap: wrap_object=2ndpm_extI range=(6 7)
      PathWrap: wrap_object=2ndmd_extI range=(8 9)
    Millard2012EquilibriumMuscle EDM: max_isometric_force=72.4 optimal_fiber_length=0.0675
        tendon_slack_length=0.3307565 pennation_angle_at_optimal=0.05235988 default_activation=1
      PathPoint P1: humerus (0.00089 -0.28919 0.01847)
      PathPoint P2: ulna (-0.00977 -0.03907 0.03085)
      PathPoint P3: ulna (-0.00755 -0.08267 0.03646)
      PathPoint P4: radius (0.00454 -0.22641 0.03678)
      PathPoint P5: fifthmc (0.00197929 0.00246388 0.00775836)
      PathPoint P6: fifthmc (-0.0110416 -0.038531 0.0150118)
      PathPoint P7: 5proxph (-0.00138649 -0.006 0.00864125)
      PathPoint P8: 5proxph (-0.0104924 -0.0300219 0.0098668)
      PathPoint P9: 5midph (-0.000199375 -0.00703822 0.00578716)
      PathPoint P10: 5midph (-0.00323208 -0.02 0.005)
      PathPoint P11: 5distph (-0.000565387 -0.014 0.004)
      PathWrap: wrap_object=EDM method=hybrid range=(4 5)
      PathWrap: wrap_object=_5thmcp method=hybrid range=(6 7)
      PathWrap: wrap_object=Fifthpm method=hybrid range=(8 9)
      PathWrap: wrap_object=Fifthmd method=hybrid range=(10 11)
    Millard2012EquilibriumMuscle EIP: max_isometric_force=47.3 optimal_fiber_length=0.0589 tendon_slack_length=0.1911
        pennation_angle_at_optimal=0.1047198 default_activation=1
      PathPoint P1: ulna (-0.00394 -0.16652 0.03682)
      PathPoint P2: ulna (0.00171 -0.17469 0.04049)
      PathPoint P3: radius (0.01076 -0.22783 0.037)
      PathPoint P4: secondmc (-0.01081 0.015 0.007)
      PathPoint P5: secondmc (0.00441 -0.027 0.013)
      PathPoint P6: 2proxph (0.00171 -0.01 0.011)
      PathPoint P7: 2proxph (0.00714 -0.038 0.013)
      PathPoint P8: 2midph (0.00115 -0.005 0.005)
      PathPoint P9: 2midph (0.00294 -0.018 0.006)
      PathPoint P10: 2distph (0 -0.004 0.002)
      PathWrap: wrap_object=EIP method=hybrid
      PathWrap: wrap_object=2ndmcp_extI method=hybrid range=(5 6)
      PathWrap: wrap_object=2ndpm_extI method=hybrid range=(7 8)
      PathWrap: wrap_object=2ndmd_extI method=hybrid range=(9 10)
    Millard2012EquilibriumMuscle EPL: max_isometric_force=88.3 optimal_fiber_length=0.054 tendon_slack_length=0.2305
        pennation_angle_at_optimal=0.1047198 default_activation=1
      PathPoint P1: ulna (-0.01412 -0.09706 0.02952)
      PathPoint P2: radius (0.00124 -0.13668 0.0227)
      PathPoint P3: radius (0.02702 -0.21872 0.03828)
      PathPoint P4: radius (0.03382 -0.22754 0.04607)
      PathPoint P5: radius (0.04234 -0.23771 0.04173)
      PathPoint P6: capitate (0.02428 0.00014 0.00608)
      PathPoint P7: trapezium (0.00809 -0.0046 0.00992)
      PathPoint P8: firstmc (0.00656 -0.0043 0.00792)
      PathPoint P9: firstmc (0.02165 -0.0242 -0.00533)
      PathPoint P10: proximal_thumb (0.01147 -0.00362 0.00156)
      PathPoint P11: proximal_thumb (0.01921 -0.0265 -0.01038)
      PathPoint P12: distal_thumb (0.00543 -0.00714 -0.00464)
      PathWrap: wrap_object=MPthumb method=hybrid
    Millard2012EquilibriumMuscle EPB: max_isometric_force=46 optimal_fiber_length=0.0675 tendon_slack_length=0.1155
        pennation_angle_at_optimal=0.122173 default_activation=1
      PathPoint P1: radius (0.01924 -0.14695 0.02114)
      PathPoint P2: radius (0.02276 -0.15857 0.02665)
      PathPoint P3: radius (0.03831 -0.19722 0.03834)
      PathPoint P4: radius (0.05235 -0.23611 0.02699)
      PathPoint P5: capitate (0.03123 0.00256 -0.00327)
      PathPoint P6: firstmc1 (0.01443 -0.00337 -0.00405)
      PathPoint P7: firstmc (0.02173 -0.02303 -0.01141)
      PathPoint P8: proximal_thumb (0.00927 -0.00618 -0.00557)
      PathWrap: wrap_object=MPthumb method=hybrid
    Millard2012EquilibriumMuscle FPL: max_isometric_force=201 optimal_fiber_length=0.0552 tendon_slack_length=0.197
        pennation_angle_at_optimal=0.1221731 default_activation=1
      PathPoint P1: radius (0.00971 -0.09458 0.01769)
      PathPoint P2: radius (0.01658 -0.13525 0.01915)
      PathPoint P3: radius (0.01869 -0.17932 0.01988)
      PathPoint P4: radius (0.038 -0.23171 0.0158)
      MovingPathPoint P5: capitate (0.0189877 0.00971324 -0.0149676) x_coordinate=flexion y_coordinate=flexion
          z_coordinate=flexion
        x_location: SimmSpline: x=(-1.22173 0 1.22173) y=(0.01869 0.01869 0.01229)
        y_location: SimmSpline: x=(-1.22173 0 1.22173) y=(0.00882 0.00882 -0.01038)
        z_location: SimmSpline: x=(-1.22173 0 1.22173) y=(-0.01547 -0.01547 -0.02627)
      PathPoint P6: capitate (0.01244 -0.02207 -0.02089)
      PathPoint P7: firstmc (-0.00608 -0.01624 -0.0094)
      PathPoint P8: firstmc (0.00208 -0.02297 -0.00956)
      PathPoint P9: proximal_thumb (-0.0045 -0.01842 -0.00508)
      PathPoint P10: proximal_thumb (0.0059 -0.02602 -0.01114)
      PathPoint P11: distal_thumb (0.00242 -0.01127 -0.00412)
      PathWrap: wrap_object=FPL method=hybrid range=(1 6)
      PathWrap: wrap_object=MPthumb method=hybrid
      PathWrap: wrap_object=IPthumb method=hybrid range=(10 11)
    Millard2012EquilibriumMuscle APL: max_isometric_force=116.7 optimal_fiber_length=0.0713 tendon_slack_length=0.1295
        pennation_angle_at_optimal=0.1396263 default_activation=1
      PathPoint P1: radius (0.01154 -0.09477 0.01681)
      PathPoint P2: radius (0.0303 -0.1397 0.03507)
      PathPoint P3: radius (0.03993 -0.16072 0.034)
      PathPoint P4: radius (0.04397 -0.17845 0.03134)
      PathPoint P5: radius (0.05505 -0.23084 0.02368)
      MovingPathPoint P6: capitate (0.0338935 0.00635739 -0.00736307) x_coordinate=flexion y_coordinate=flexion
          z_coordinate=flexion
        x_location: SimmSpline: x=(-1.22173 0 1.22173) y=(0.03385 0.0336 0.0276)
        y_location: SimmSpline: x=(-1.22173 0 1.22173) y=(0.00634 0.00624 0.00384)
        z_location: SimmSpline: x=(-1.22173 0 1.22173) y=(-0.00745 -0.00795 -0.01995)
      PathPoint P7: firstmc1 (0.01058 0.00662 -0.00619)
      PathPoint P8: firstmc (0.00629 0.00323 -0.00589)
      PathPoint P9: firstmc (0.00827 -0.00586 -0.00604)
    Millard2012EquilibriumMuscle APB: min_control=0.01 max_isometric_force=34.54 optimal_fiber_length=0.0511
        tendon_slack_length=0.02436921 pennation_angle_at_optimal=0.08028515 default_fiber_length=0.1
      PathPoint P1: capitate (0.012493 -0.005469 -0.016108)
      PathPoint P1: trapezium (0.00806407 -0.000600866 -0.00780272)
      PathPoint P4: proximal_thumb (0.00770617 -0.0047171 -0.009)
      PathPoint P5: proximal_thumb (0.0148 -0.02 -0.011)
      ActiveForceLengthCurve: min_norm_active_fiber_length=0.4441 transition_norm_fiber_length=0.73
          max_norm_active_fiber_length=1.8123 shallow_ascending_slope=0.8616 minimum_value=0
      FiberForceLengthCurve: strain_at_zero_force=0 strain_at_one_norm_force=0.7
      TendonForceLengthCurve: strain_at_one_norm_force=0.049
    Millard2012EquilibriumMuscle FPB: min_control=0.01 max_isometric_force=33.53 optimal_fiber_length=0.0509
        tendon_slack_length=0.006795853 pennation_angle_at_optimal=0.1082104 default_fiber_length=0.1
      PathPoint FPB_opt-P1: capitate (0.00959 -0.00667 -0.01481)
      PathPoint FPB_opt-P2: trapezium (0.0015 -0.0124979 -0.00496)
      PathPoint FPB_opt-P3: proximal_thumb (-0.00565728 -0.00240197 0.00084)
      PathPoint FPB_opt-P4: proximal_thumb (0.002 -0.013 -0.004)
      ActiveForceLengthCurve: min_norm_active_fiber_length=0.4441 transition_norm_fiber_length=0.73
          max_norm_active_fiber_length=1.8123 shallow_ascending_slope=0.8616 minimum_value=0
      FiberForceLengthCurve: strain_at_zero_force=0 strain_at_one_norm_force=0.7
      TendonForceLengthCurve: strain_at_one_norm_force=0.049
    Millard2012EquilibriumMuscle OPP: min_control=0.01 max_isometric_force=51.82 optimal_fiber_length=0.0436
        tendon_slack_length=0.002540121 pennation_angle_at_optimal=0.08552113 default_fiber_length=0.1
      PathPoint P1: capitate (0.01129 -0.00147 -0.01731)
      PathPoint P2: firstmc (-0.00238629 -0.00894 -0.00551728)
      PathPoint P3: firstmc (0.012 -0.028 -0.017)
      ActiveForceLengthCurve: min_norm_active_fiber_length=0.4441 transition_norm_fiber_length=0.73
          max_norm_active_fiber_length=1.8123 shallow_ascending_slope=0.8616 minimum_value=0
      FiberForceLengthCurve: strain_at_zero_force=0 strain_at_one_norm_force=0.7
      TendonForceLengthCurve: strain_at_one_norm_force=0.049
    Millard2012EquilibriumMuscle ADPt: min_control=0.01 max_isometric_force=59.944 optimal_fiber_length=0.0417
        tendon_slack_length=0.02311892 pennation_angle_at_optimal=0.301942 default_fiber_length=0.1
      PathPoint ADPt_opt-P1: capitate (0.00064 -0.02422 0.00149)
      PathPoint ADPt_opt-P2: trapezium (0.0082177 -0.0246635 -0.00488374)
      PathPoint ADPt_opt-P3: proximal_thumb (-0.00730309 -0.00505412 -0.00146726)
      PathPoint ADPt_opt-P4: proximal_thumb (0.0056 -0.0095 0.0023)
      ActiveForceLengthCurve: min_norm_active_fiber_length=0.4441 transition_norm_fiber_length=0.73
          max_norm_active_fiber_length=1.8123 shallow_ascending_slope=0.8616 minimum_value=0
      FiberForceLengthCurve: strain_at_zero_force=0 strain_at_one_norm_force=0.7
      TendonForceLengthCurve: strain_at_one_norm_force=0.049
    Millard2012EquilibriumMuscle ADPo: min_control=0.01 max_isometric_force=102.108 optimal_fiber_length=0.03477273
        tendon_slack_length=0.0378533 pennation_angle_at_optimal=0.301942 default_fiber_length=0.1
      PathPoint ADPo_opt-P1: capitate (-0.00131 -0.00527 -0.00665)
      PathPoint ADPo_opt-P2: trapezium (0.00741594 -0.0214963 -0.00466016)
      PathPoint ADPo_opt-P3: proximal_thumb (-0.00698466 -0.00535159 -0.000499131)
      PathPoint ADPo_opt-P4: proximal_thumb (0.0051 -0.01352 -0.00715)
      ActiveForceLengthCurve: min_norm_active_fiber_length=0.4441 transition_norm_fiber_length=0.73
          max_norm_active_fiber_length=1.8123 shallow_ascending_slope=0.8616 minimum_value=0
      FiberForceLengthCurve: strain_at_zero_force=0 strain_at_one_norm_force=0.7
      TendonForceLengthCurve: strain_at_one_norm_force=0.049
    Millard2012EquilibriumMuscle ADM: max_isometric_force=45.2 optimal_fiber_length=0.0567
        tendon_slack_length=0.008617426 pennation_angle_at_optimal=0.06806784 default_activation=1
      PathPoint P1: fifthmc (0.001 0.006 -0.008)
      PathPoint P2: fifthmc (-0.0115 -0.036 0.003)
      PathPoint P3: 5proxph (-0.0115 -0.01 -0.002)
      PathWrap: wrap_object=_5thmcp method=hybrid
    Millard2012EquilibriumMuscle FDM: max_isometric_force=27.4 optimal_fiber_length=0.04982727
        tendon_slack_length=0.006377202 pennation_angle_at_optimal=0.06283185 default_activation=1
      PathPoint P1: fifthmc (-0.0025634 -0.00199908 -0.00487276)
      PathPoint P2: fifthmc (-0.0115 -0.036 0.003)
      PathPoint P3: 5proxph (-0.0115 -0.01 -0.002)
      PathWrap: wrap_object=_5thmcp method=hybrid
    Millard2012EquilibriumMuscle 1stPI: max_isometric_force=38.1 optimal_fiber_length=0.03068182
        tendon_slack_length=0.01988032 pennation_angle_at_optimal=0.1099557 default_activation=1
      PathPoint P1: secondmc (-0.006 0.011 -0.003)
      PathPoint P2: secondmc (-0.003 -0.025 0.003)
      PathPoint P3: 2proxph (-0.005 -0.011 0.001)
    Millard2012EquilibriumMuscle 2ndPI: max_isometric_force=33 optimal_fiber_length=0.03190909
        tendon_slack_length=0.0185252 pennation_angle_at_optimal=0.1343904 default_activation=1
      PathPoint P1: thirdmc (-0.006 0.016 -0.003)
      PathPoint P2: fourthmc (0.001 -0.047 0.0025)
      PathPoint P3: 4proxph (0.006 -0.01 -0.002)
    Millard2012EquilibriumMuscle 3rdPI: max_isometric_force=31 optimal_fiber_length=0.02896364
        tendon_slack_length=0.01710424 pennation_angle_at_optimal=0.143117 default_activation=1
      PathPoint P1: fifthmc (0 -0.012 0.003)
      PathPoint P2: fifthmc (-0.0045 -0.0425 0.007)
      PathPoint P3: 5proxph (0.003 -0.015 -0.002)
    Millard2012EquilibriumMuscle 1stDI_MC1: max_isometric_force=60.7 optimal_fiber_length=0.02237011
        tendon_slack_length=0.0417197 pennation_angle_at_optimal=0.1605703 default_activation=1
      PathPoint P1: firstmc (0.00443429 -0.00969982 0.003216)
      PathPoint P2: secondmc (0.009 -0.0266 0)
      PathPoint P3: 2proxph (0.009 -0.016 -0.001)
    Millard2012EquilibriumMuscle 1stDI_MC2: max_isometric_force=15.51 optimal_fiber_length=0.03890454
        tendon_slack_length=0.02244353 pennation_angle_at_optimal=0.1605703 default_activation=1
      PathPoint P1: secondmc (0.003 0.016 -0.003)
      PathPoint P2: secondmc (0.00825 -0.025 -0.002)
      PathPoint P3: 2proxph (0.009 -0.016 -0.001)
    Millard2012EquilibriumMuscle 2ndDI: max_isometric_force=68.1 optimal_fiber_length=0.03080454
        tendon_slack_length=0.02351616 pennation_angle_at_optimal=0.143117 default_activation=1
      PathPoint P1: thirdmc (0.003 0.016 -0.003)
      PathPoint P2: thirdmc (0.007 -0.021 0.001)
      PathPoint P3: 3proxph (0.008 -0.012 0)
    Millard2012EquilibriumMuscle 3rdDI: max_isometric_force=48.3 optimal_fiber_length=0.03166364
        tendon_slack_length=0.02463824 pennation_angle_at_optimal=0.1710423 default_activation=1
      PathPoint P1: thirdmc (-0.004 0.016 -0.003)
      PathPoint P2: thirdmc (-0.006 -0.024 0.0005)
      PathPoint P3: 3proxph (-0.006 -0.014 0.001)
      PathWrap: wrap_object=_3rdmcp method=hybrid
    Millard2012EquilibriumMuscle 4thDI: max_isometric_force=46.23 optimal_fiber_length=0.03166364
        tendon_slack_length=0.02400178 pennation_angle_at_optimal=0.164061 default_activation=1
      PathPoint P1: fourthmc (-0.005 -0.007 -0.003)
      PathPoint P2: fourthmc (-0.01 -0.042 0.007)
      PathPoint P3: 4proxph (-0.008 -0.012 -0.002)
    Millard2012EquilibriumMuscle LUML: max_isometric_force=3.05 optimal_fiber_length=0.06148636
        tendon_slack_length=0.000444845 pennation_angle_at_optimal=0.0122173 ignore_tendon_compliance=true
        default_activation=1
      PathPoint P1: fourthmc (-0.00263187 -0.0078013 -0.00517657)
      PathPoint P2: fifthmc (-0.005 -0.038 0.001)
      PathPoint P3: 5proxph (-0.0015 -0.019 -0.003)
      PathPoint P4: 5proxph (-0.00302 -0.022 0.004)
      PathWrap: wrap_object=_5thmcp method=hybrid
    Millard2012EquilibriumMuscle LUMR: max_isometric_force=4.06 optimal_fiber_length=0.06897273
        tendon_slack_length=0.000740062 pennation_angle_at_optimal=0.01919862 ignore_tendon_compliance=true
        default_activation=1
      PathPoint P1: thirdmc (-0.00314923 0.0200016 -0.0166407)
      PathPoint P2: fourthmc (0 -0.039 -0.001)
      PathPoint P3: 4proxph (0.003 -0.012 -0.007)
      PathPoint P4: 4proxph (0.003 -0.017 0.003)
      PathWrap: wrap_object=_4thmcp
    Millard2012EquilibriumMuscle LUMM: max_isometric_force=4.06 optimal_fiber_length=0.06811364
        tendon_slack_length=0.00253032 pennation_angle_at_optimal=0.02792527 ignore_tendon_compliance=true
        default_activation=1
      PathPoint P1: thirdmc (0.002 0.022 -0.016)
      PathPoint P2: thirdmc (0.006 -0.02 -0.01)
      PathPoint P3: 3proxph (0.009 -0.016 0.005)
    Millard2012EquilibriumMuscle LUMI: max_isometric_force=5.59 optimal_fiber_length=0.06799091
        tendon_slack_length=0.001182965 pennation_angle_at_optimal=0.02094395 ignore_tendon_compliance=true
        default_activation=1
      PathPoint P1: secondmc (-0.0055 0.022 -0.014)
      PathPoint P2: secondmc (0.005 -0.0225 -0.006)
      PathPoint P3: 2proxph (0.005 -0.01 -0.005)
      PathPoint P4: 2proxph (0.005 -0.016 -0.005)
      PathWrap: wrap_object=2ndmcp_extI method=hybrid
    CoordinateLimitForce deviation_ligaments: coordinate=deviation upper_stiffness=52.5961 [N*m/degree]
        upper_limit=20 [degrees] lower_stiffness=487.176 [N*m/degree] lower_limit=-6 [degrees] damping=0
        transition=39.1586 [degrees]
    CoordinateLimitForce deviation_damping: coordinate=deviation upper_stiffness=1e-8 upper_limit=190
        lower_stiffness=1e-8 lower_limit=190 damping=0.001745 transition=1
    CoordinateLimitForce flexion_ligaments: coordinate=flexion upper_stiffness=200 upper_limit=60
        lower_stiffness=135.3232 lower_limit=-60 damping=0 transition=92.916
    CoordinateLimitForce flexion_damping: coordinate=flexion upper_stiffness=1e-8 upper_limit=190 lower_stiffness=1e-8
        lower_limit=190 damping=0.00043633 transition=1
    FunctionBasedBushingForce [values shared by the 16 below unless stated]: location_body_2=(0 0 0)
        translational_damping=(0 0 0) moment_visual_scale=0.005 force_visual_scale=0.005 visual_aspect_ratio=5
        m_y_theta_y_function=Constant(value=0) m_z_theta_z_function=Constant(value=0)
        f_x_delta_x_function=Constant(value=0) f_y_delta_y_function=Constant(value=0)
        f_z_delta_z_function=Constant(value=0)
    FunctionBasedBushingForce cmc_flexion_passive_torque: body_1=capitate body_2=firstmc1
        location_body_1=(0.015293 -0.004569 -0.010308) orientation_body_1=(-0.7805 0.9677 1.496)
        orientation_body_2=(-0.7805 0.9677 1.496) rotational_damping=(0.0142 0 0)
      m_x_theta_x_function: SimmSpline: x=(-0.785398 -0.744674 -0.703949 -0.663225 -0.622501 -0.581776 -0.541052 -0.500328 -0.459603 -0.418879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)
          y=(-2.11246 -1.56572 -1.12697 -0.813336 -0.583454 -0.422181 -0.311359 -0.232826 -0.171442 -0.12721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)
    FunctionBasedBushingForce cmc_abduction_passive_torque: body_1=firstmc1 body_2=firstmc
        location_body_1=(0.0072 -0.0054 -0.0025) orientation_body_1=(0.19 -0.5753 0.939)
        orientation_body_2=(0.19 -0.5753 0.939) rotational_damping=(0.0142 0 0)
      m_x_theta_x_function: SimmSpline: x=(-0.436332 -0.409888 -0.383444 -0.356999 -0.330555 -0.30411 -0.277666 -0.251222 -0.224777 -0.198333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)
          y=(-0.988633 -0.896213 -0.791667 -0.682573 -0.605303 -0.527273 -0.443939 -0.345455 -0.299243 -0.220455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)
    FunctionBasedBushingForce mcp_flexion_passive_torque: body_1=firstmc body_2=proximal_thumb
        location_body_1=(0.0165 -0.0292 -0.0127) orientation_body_1=(-4.4639 2.6726 4.6178)
        orientation_body_2=(-4.4639 2.6726 4.6178) rotational_damping=(0.0142 0 0)
      m_x_theta_x_function: SimmSpline: x=(-0.698132 -0.645148 -0.592165 -0.539182 -0.486199 -0.433216 -0.380232 -0.327249 -0.274266 -0.221283 -0.1683 -0.115316 -0.0623332 -0.00934998 0.0436332 0.0966164 0.1496 0.202583 0.255566 0.308549 0.361532 0.414516 0.467499 0.520482 0.573465 0.626449 0.679432 0.732415 0.785398)
          y=(-0.125354 -0.0897995 -0.0644929 -0.0464804 -0.0336594 -0.0245336 -0.0180378 -0.0134138 -0.0101216 -0.00777699 -0.00610597 -0.00491312 -0.00405861 -0.00344171 -0.00298887 -0.00264477 -0.00236534 -0.00211178 -0.00184472 -0.00151746 -0.00106725 -0.000402609 0.000615687 0.00220416 0.00470291 0.00864866 0.0148902 0.0247709 0.0404181)
    FunctionBasedBushingForce ip_flexion_passive_torque: body_1=proximal_thumb body_2=distal_thumb
        location_body_1=(0.014 -0.0259 -0.0101) orientation_body_1=(-0.9482 1.1788 1.4393)
        orientation_body_2=(-0.9482 1.1788 1.4393) rotational_damping=(0.0105 0 0)
      m_x_theta_x_function: SimmSpline: x=(-0.4363 -0.374 -0.3117 -0.2493 -0.187 -0.1247 -0.0623 0 0.0623 0.1247 0.187 0.2493 0.3117 0.374 0.4363 0.4987 0.561 0.6233 0.6857 0.748 0.8103 0.8727 0.935 0.9973 1.0597 1.122 1.1843 1.2467 1.309)
          y=(-0.0696 -0.0449 -0.0322 -0.0232 -0.0168 -0.0123 -0.009 -0.0067 -0.0051 -0.0039 -0.0031 -0.0025 -0.002 -0.0017 -0.0015 -0.0013 -0.0012 -0.0011 -0.0009 -0.0008 -0.0005 -0.0002 0.0003 0.0011 0.0024 0.0043 0.0074 0.0124 0.0289)
    FunctionBasedBushingForce 2mcp_flexion_passive_torque: body_1=secondmc body_2=2proxph
        location_body_1=(0.003501 -0.028243 0.00362) orientation_body_1=(0.5052 0.1871 0.0729)
        orientation_body_2=(0.5052 0.1871 0.0729) rotational_damping=(0.0142 0 0)
      m_x_theta_x_function: SimmSpline: x=(-1.5708 -1.48353 -1.39626 -1.309 -1.22173 -1.13446 -1.0472 -0.959931 -0.872665 -0.785398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)
          y=(-0.298165 -0.22595 -0.171253 -0.129824 -0.0984439 -0.0746759 -0.0566734 -0.0430378 -0.0327098 -0.024887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)
    FunctionBasedBushingForce 2pip_flexion_passive_torque: body_1=2proxph body_2=2midph
        location_body_1=(0.007517 -0.041273 0.007326) orientation_body_1=(0.8101 0.2145 -0.0397)
        orientation_body_2=(0.8101 0.2145 -0.0397) rotational_damping=(0.0105 0 0)
      m_x_theta_x_function: SimmSpline: x=(0 0.0872665 0.174533 0.261799 0.349066 0.436332 0.523599 0.610865 0.698132 0.785398 1.22173 1.5708 2.0944)
          y=(-0.015 -0.00363989 0.00725323 0.0174561 0.0267453 0.0348977 0.0416899 0.0468986 0.0503006 0.0516725 0.075 0.11 0.25)
    FunctionBasedBushingForce 2dip_flexion_passive_torque: body_1=2midph body_2=2distph
        location_body_1=(0.003333 -0.024888 0.00122) orientation_body_1=(-1.4139 -0.1578 -0.051)
        orientation_body_2=(-1.4139 -0.1578 -0.051) rotational_damping=(0.0081 0 0)
      m_x_theta_x_function: SimmSpline: x=(-0.0872665 0 0.0872665 0.174533 0.261799 0.349066 0.436332 0.523599 0.610865 0.698132 0.785398 0.872665 0.959931 1.0472 1.13446 1.22173 1.309 1.39626 1.48353 1.5708)
          y=(-0.019 0.019 0.0228295 0.0255162 0.0274708 0.0291039 0.0308263 0.0330487 0.0361817 0.0406362 0.0468227 0.055152 0.0660349 0.079882 0.0971039 0.118112 0.143315 0.173126 0.207955 0.248212)
    FunctionBasedBushingForce 3mcp_flexion_passive_torque: body_1=thirdmc body_2=3proxph
        location_body_1=(0.00024 -0.02629 0.001778) orientation_body_1=(-0.8349189 -0.02813833 0.03952269)
        orientation_body_2=(-0.8349189 -0.02813833 0.03952269) rotational_damping=(0.0142 0 0)
      m_x_theta_x_function: SimmSpline: x=(-1.5708 -1.48353 -1.39626 -1.309 -1.22173 -1.13446 -1.0472 -0.959931 -0.872665 -0.785398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)
          y=(-0.675606 -0.498608 -0.368205 -0.272131 -0.201349 -0.1492 -0.11078 -0.0824738 -0.0616194 -0.046255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)
    FunctionBasedBushingForce 3pip_flexion_passive_torque: body_1=3proxph body_2=3midph
        location_body_1=(0.00165 -0.044211 0.00623) orientation_body_1=(1.439322 -0.07526419 0.09332884)
        orientation_body_2=(1.439322 -0.07526419 0.09332884) rotational_damping=(0.0105 0 0)
      m_x_theta_x_function: SimmSpline: x=(0 0.0872665 0.174533 0.261799 0.349066 0.436332 0.523599 0.610865 0.698132 0.785398 1.22173 1.5708 2.0944)
          y=(-0.0315 -0.00764377 0.0152318 0.0366578 0.0561651 0.0732852 0.0875488 0.0984871 0.105631 0.108512 0.1575 0.231 0.525)
    FunctionBasedBushingForce 3dip_flexion_passive_torque: body_1=3midph body_2=3distph
        location_body_1=(0.001365 -0.029047 0.001954) orientation_body_1=(-0.5917407 -0.1011885 -0.02437354)
        orientation_body_2=(-0.5917407 -0.1011885 -0.02437354) rotational_damping=(0.0081 0 0)
      m_x_theta_x_function: SimmSpline: x=(-0.0872665 0 0.0872665 0.174533 0.261799 0.349066 0.436332 0.523599 0.610865 0.698132 0.785398 0.872665 0.959931 1.0472 1.13446 1.22173 1.309 1.39626 1.48353 1.5708)
          y=(-0.019 0.0399 0.0479419 0.053584 0.0576887 0.0611182 0.0647352 0.0694023 0.0759816 0.085336 0.0983277 0.115819 0.138673 0.167752 0.203918 0.248035 0.300961 0.363565 0.436706 0.521245)
    FunctionBasedBushingForce 4mcp_flexion_passive_torque: body_1=fourthmc body_2=4proxph
        location_body_1=(-0.0053 -0.0489 0.007) orientation_body_1=(-1.371513 0.07010075 0.01625272)
        orientation_body_2=(-1.371513 0.07010075 0.01625272) rotational_damping=(0.0142 0 0)
      m_x_theta_x_function: SimmSpline: x=(-1.5708 -1.48353 -1.39626 -1.309 -1.22173 -1.13446 -1.0472 -0.959931 -0.872665 -0.785398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)
          y=(-0.65841 -0.477249 -0.346097 -0.251148 -0.182409 -0.132645 -0.0966177 -0.0705357 -0.0516533 -0.0379833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)
    FunctionBasedBushingForce 4pip_flexion_passive_torque: body_1=4proxph body_2=4midph
        location_body_1=(-0.0039 -0.0398 0.0057) orientation_body_1=(-0.6121567 -0.05586396 -0.08138803)
        orientation_body_2=(-0.6121567 -0.05586396 -0.08138803) rotational_damping=(0.0105 0 0)
      m_x_theta_x_function: SimmSpline: x=(0 0.0872665 0.174533 0.261799 0.349066 0.436332 0.523599 0.610865 0.698132 0.785398 1.22173 1.5708 2.0944)
          y=(-0.02475 -0.00600582 0.0119678 0.0288026 0.0441297 0.0575812 0.0687883 0.0773827 0.082996 0.0852596 0.12375 0.1815 0.4125)
    FunctionBasedBushingForce 4dip_flexion_passive_torque: body_1=4midph body_2=4distph
        location_body_1=(-0.0026 -0.0245 0.0033) orientation_body_1=(-0.771777 -0.1003712 -0.2928735)
        orientation_body_2=(-0.771777 -0.1003712 -0.2928735) rotational_damping=(0.0081 0 0)
      m_x_theta_x_function: SimmSpline: x=(-0.0872665 0 0.0872665 0.174533 0.261799 0.349066 0.436332 0.523599 0.610865 0.698132 0.785398 0.872665 0.959931 1.0472 1.13446 1.22173 1.309 1.39626 1.48353 1.5708)
          y=(-0.019 0.03135 0.0376687 0.0421017 0.0453268 0.0480214 0.0508634 0.0545304 0.0596998 0.0670497 0.0772575 0.0910008 0.108958 0.131805 0.160221 0.194885 0.23647 0.285658 0.343126 0.40955)
    FunctionBasedBushingForce 5mcp_flexion_passive_torque: body_1=fifthmc body_2=5proxph
        location_body_1=(-0.0111 -0.0423 0.0097) orientation_body_1=(0.4987802 -0.07350343 -0.2058193)
        orientation_body_2=(0.4987802 -0.07350343 -0.2058193) rotational_damping=(0.0142 0 0)
      m_x_theta_x_function: SimmSpline: x=(-1.5708 -1.48353 -1.39626 -1.309 -1.22173 -1.13446 -1.0472 -0.959931 -0.872665 -0.785398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)
          y=(-0.339346 -0.255301 -0.192138 -0.144667 -0.10899 -0.0821768 -0.0620253 -0.0468804 -0.0354981 -0.0269438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)
    FunctionBasedBushingForce 5pip_flexion_passive_torque: body_1=5proxph body_2=5midph
        location_body_1=(-0.0125 -0.0335 0.0043) orientation_body_1=(-2.940888 0.2512543 0.289816)
        orientation_body_2=(-2.940888 0.2512543 0.289816) rotational_damping=(0.0105 0 0)
      m_x_theta_x_function: SimmSpline: x=(0 0.0872665 0.174533 0.261799 0.349066 0.436332 0.523599 0.610865 0.698132 0.785398 1.22173 1.5708 2.0944)
          y=(-0.0165 -0.00400388 0.00797855 0.0192017 0.0294198 0.0383875 0.0458589 0.0515885 0.0553307 0.0568398 0.0825 0.121 0.275)
    FunctionBasedBushingForce 5dip_flexion_passive_torque: body_1=5midph body_2=5distph
        location_body_1=(-0.0075 -0.0195 0.002) orientation_body_1=(1.617926 -0.4392679 0.1652852)
        orientation_body_2=(1.617926 -0.4392679 0.1652852) rotational_damping=(0.0081 0 0)
      m_x_theta_x_function: SimmSpline: x=(-0.0872665 0 0.0872665 0.174533 0.261799 0.349066 0.436332 0.523599 0.610865 0.698132 0.785398 0.872665 0.959931 1.0472 1.13446 1.22173 1.309 1.39626 1.48353 1.5708)
          y=(-0.019 0.0209 0.0251125 0.0280678 0.0302179 0.0320143 0.0339089 0.0363536 0.0397999 0.0446998 0.051505 0.0606672 0.0726384 0.0878702 0.106814 0.129923 0.157646 0.190439 0.228751 0.273033)
